// SBML level 3 version 1
// SBML generated from Reactome version 93 on 6/24/25, 4:00 AM using JSBML version 1.5.

model pathway_389958()
  // Cooperation of Prefoldin and TriC/CCT in actin and tubulin folding
  // In the case of actin and tubulin folding, and perhaps other substrates, the emerging polypeptide chain is transferred from the ribosome to TRiC via Prefoldin (Vainberg et al., 1998).
  // reactome:R-HSA-389958
  // isDescribedBy pubmed:9630229

  // Compartments:
  compartment cytosol = 1.408e-12;  // GO:0005829

  // Species:
  // Derived from a Reactome Complex. Here is Reactomes nested structure for this complex: (Q92526, Q99832, P49368, P48643, P50991, P17987, P78371, P40227, P50990, 8x30616, P60709). Reactome uses a nested structure for complexes, which cannot be fully represented in SBML Level 3 Version 1 core
  species CCT_TRiC_ATP_actin_cytosol in cytosol; CCT_TRiC_ATP_actin_cytosol is "CCT/TRiC:ATP:actin [cytosol]";  // reactome:R-HSA-390499; hasPart uniprot:Q92526 uniprot:Q99832 uniprot:P49368 uniprot:P48643
  // Derived from a Reactome Complex. Here is Reactomes nested structure for this complex: (Q92526, Q99832, 8x456216, P49368, P48643, P50991, P17987, P78371, P40227, P50990). Reactome uses a nested structure for complexes, which cannot be fully represented in SBML Level 3 Version 1 core
  species CCT_TRiC_ADP_cytosol in cytosol; CCT_TRiC_ADP_cytosol is "CCT/TRiC:ADP [cytosol]";  // isDescribedBy pubmed:15519848 pubmed:21572988 pubmed:9013858; reactome:R-HSA-390455; hasPart uniprot:Q92526 uniprot:Q99832 CHEBI:456216 uniprot:P49368; isHomologTo reactome:R-MMU-390455 reactome:R-RNO-390455 reactome:R-CFA-390455 reactome:R-BTA-390455
  // Derived from a Reactome Complex. Here is Reactomes nested structure for this complex: (Q9BVA1, Q9H4B7, P78371, P0DPH8, Q13509, Q9H853, 8x456216, P48643, P68366, P40227, Q6PEY2, P68363, Q13885, P17987, Q9BUF5, Q92526, Q99832, Q9BQE3, P0DPH7, P49368, P50991, P68371, P50990, Q9NY65, P04350, Q71U36, A6NHL2). Reactome uses a nested structure for complexes, which cannot be fully represented in SBML Level 3 Version 1 core
  species species_390501 in cytosol; species_390501 is "CCT/TRiC:ADP:non-native tubulin [cytosol]";  // reactome:R-HSA-390501; hasPart uniprot:Q9BVA1 uniprot:Q9H4B7 uniprot:P78371 uniprot:P0DPH8
  // Derived from a Reactome Complex. Here is Reactomes nested structure for this complex: (Q92526, Q99832, 8x456216, P49368, P48643, P50991, P17987, P78371, P40227, P50990, P60709). Reactome uses a nested structure for complexes, which cannot be fully represented in SBML Level 3 Version 1 core
  species CCT_TRiC_ADP_actin_cytosol in cytosol; CCT_TRiC_ADP_actin_cytosol is "CCT/TRiC:ADP:actin [cytosol]";  // reactome:R-HSA-390476; hasPart uniprot:Q92526 uniprot:Q99832 CHEBI:456216 uniprot:P49368
  // Derived from a Reactome EntityWithAccessionedSequence. This is a protein
  species ACTB_cytosol in cytosol = 0; ACTB_cytosol is "ACTB [cytosol]";  // uniprot:P60709 reactome:R-HSA-201861; isHomologTo reactome:R-MMU-2263470 reactome:R-RNO-201861 reactome:R-CFA-201861 reactome:R-BTA-201861
  // Derived from a Reactome SimpleEntity. This is a small compound
  species Pi_cytosol in cytosol = 0; Pi_cytosol is "Pi [cytosol]";  // CHEBI:43474 reactome:R-ALL-29372
  // Derived from a Reactome Complex. Here is Reactomes nested structure for this complex: (Q9BVA1, Q9H4B7, P78371, 8x30616, P0DPH8, Q13509, Q9H853, P48643, P40227, P68366, Q6PEY2, P68363, Q13885, P17987, Q9BUF5, Q92526, Q99832, Q9BQE3, P0DPH7, P49368, P50991, P68371, P50990, Q9NY65, P04350, Q71U36, A6NHL2). Reactome uses a nested structure for complexes, which cannot be fully represented in SBML Level 3 Version 1 core
  species species_390446 in cytosol; species_390446 is "CCT/TRiC:ATP:unfolded tubulin complex [cytosol]";  // reactome:R-HSA-390446; hasPart uniprot:Q9BVA1 uniprot:Q9H4B7 uniprot:P78371 CHEBI:30616
  // Derived from a Reactome SimpleEntity. This is a small compound
  species ADP_cytosol in cytosol = 0; ADP_cytosol is "ADP [cytosol]";  // CHEBI:456216 reactome:R-ALL-29370
  // Derived from a Reactome Complex. Here is Reactomes nested structure for this complex: (P68363, Q9BVA1, Q13885, Q9H4B7, Q9BUF5, P0DPH8, Q9H853, Q13509, 37565, Q9BQE3, P0DPH7, P68371, P68366, Q9NY65, Q71U36, P04350, Q6PEY2, A6NHL2). Reactome uses a nested structure for complexes, which cannot be fully represented in SBML Level 3 Version 1 core
  species species_390457 in cytosol = 0; species_390457 is "tubulin-GTP folding intermediate [cytosol]";  // reactome:R-HSA-390457; hasPart uniprot:P68363 uniprot:Q9BVA1 uniprot:Q13885 uniprot:Q9H4B7
  // Derived from a Reactome Complex. Here is Reactomes nested structure for this complex: (Q9UHV9, Q9BVA1, Q13885, Q9H4B7, Q99471, O15212, Q9BUF5, P0DPH8, P60709, O60925, Q13509, Q9BQE3, P0DPH7, P61758, Q9NQP4, P68371, P68366, P04350, Q71U36). Reactome uses a nested structure for complexes, which cannot be fully represented in SBML Level 3 Version 1 core
  species species_390460 in cytosol; species_390460 is "Prefoldin-associated actin/tubulin [cytosol]";  // reactome:R-HSA-390460; hasPart uniprot:Q9UHV9 uniprot:Q9BVA1 uniprot:Q13885 uniprot:Q9H4B7
  // Derived from a Reactome SimpleEntity. This is a small compound
  species ATP_cytosol in cytosol; ATP_cytosol is "ATP [cytosol]";  // CHEBI:30616 reactome:R-ALL-113592
  // Derived from a Reactome SimpleEntity. This is a small compound
  species GTP_cytosol in cytosol; GTP_cytosol is "GTP [cytosol]";  // CHEBI:37565 reactome:R-ALL-29438
  // Derived from a Reactome DefinedSet. This is a list of alternative entities, any of which can perform the given function
  species unfolded_actin_tubulin_cytosol in cytosol; unfolded_actin_tubulin_cytosol is "unfolded actin/tubulin [cytosol]";  // reactome:R-HSA-390445; hasPart uniprot:Q13509 uniprot:Q9BQE3 uniprot:P0DPH7 uniprot:Q9BVA1
  // Derived from a Reactome Complex. Here is Reactomes nested structure for this complex: (Q9BVA1, Q13885, Q9H4B7, P17987, P78371, Q9BUF5, P0DPH8, P60709, Q13509, Q92526, Q99832, Q9BQE3, P0DPH7, 8x456216, P49368, P48643, P50991, P68371, P68366, P40227, P50990, P04350, Q71U36). Reactome uses a nested structure for complexes, which cannot be fully represented in SBML Level 3 Version 1 core
  species species_390495 in cytosol = 0; species_390495 is "actin/tubulin-bound CCT/TRiC:ADP [cytosol]";  // reactome:R-HSA-390495; hasPart uniprot:Q9BVA1 uniprot:Q13885 uniprot:Q9H4B7 uniprot:P17987
  // Derived from a Reactome Complex. Here is Reactomes nested structure for this complex: (Q9UHV9, P61758, Q9NQP4, Q99471, O15212, O60925). Reactome uses a nested structure for complexes, which cannot be fully represented in SBML Level 3 Version 1 core
  species Prefoldin_cytosol in cytosol; Prefoldin_cytosol is "Prefoldin [cytosol]";  // reactome:R-HSA-390452; hasPart uniprot:Q9UHV9 uniprot:P61758 uniprot:Q9NQP4 uniprot:Q99471
  species avg_species_390499 in cytosol = 0; avg_species_390499 is "Average of species_390499";
  species avg_species_390455 in cytosol = 0; avg_species_390455 is "Average of species_390455";
  species avg_species_390501 in cytosol = 0; avg_species_390501 is "Average of species_390501";
  species avg_species_390476 in cytosol = 0; avg_species_390476 is "Average of species_390476";
  species avg_species_390446 in cytosol = 0; avg_species_390446 is "Average of species_390446";
  species avg_species_390460 in cytosol = 0; avg_species_390460 is "Average of species_390460";
  species avg_species_113592 in cytosol = 0; avg_species_113592 is "Average of species_113592";
  species avg_species_29438 in cytosol = 0; avg_species_29438 is "Average of species_29438";
  species avg_species_390445 in cytosol = 0; avg_species_390445 is "Average of species_390445";
  species avg_species_390452 in cytosol = 0; avg_species_390452 is "Average of species_390452";
  species avg_species_390495 in cytosol = 0; avg_species_390495 is "Average of species_390495";
  species avg_species_390457 in cytosol = 0; avg_species_390457 is "Average of species_390457";
  species avg_species_29370 in cytosol = 0; avg_species_29370 is "Average of species_29370";
  species avg_species_29372 in cytosol = 0; avg_species_29372 is "Average of species_29372";
  species avg_species_201861 in cytosol = 0; avg_species_201861 is "Average of species_201861";

  // Parameters:
  scale_parameter = 1;
  k_output_species_390495 = 1;
  k_output_species_390457 = 1;
  k_output_species_29370 = 1;
  k_output_species_29372 = 1;
  k_output_species_201861 = 1;
  k_input_species_390445 = 1e-7;
  k_input_species_29438 = 1e-7;
  k_input_species_113592 = 1e-7;
  k_input_species_390476 = 1e-7;
  k_input_species_390501 = 1e-7;
  k_forcat_reaction_390453 = 1;
  k_forcat_reaction_389961 = 1;
  k_forcat_reaction_390459 = 1;
  k_forcat_reaction_389980 = 1;
  k_forcat_reaction_389954 = 1;
  k_forcat_reaction_389970 = 1;
  get_time = 0; get_time is "Auxiliary variable used in place of time due to naming restrictions";

  // Rate rules:
  get_time' = 1;
  avg_species_390499' = (CCT_TRiC_ATP_actin_cytosol - avg_species_390499)/(get_time + 1e-6);
  avg_species_390455' = (CCT_TRiC_ADP_cytosol - avg_species_390455)/(get_time + 1e-6);
  avg_species_390501' = (species_390501 - avg_species_390501)/(get_time + 1e-6);
  avg_species_390476' = (CCT_TRiC_ADP_actin_cytosol - avg_species_390476)/(get_time + 1e-6);
  avg_species_390446' = (species_390446 - avg_species_390446)/(get_time + 1e-6);
  avg_species_390460' = (species_390460 - avg_species_390460)/(get_time + 1e-6);
  avg_species_113592' = (ATP_cytosol - avg_species_113592)/(get_time + 1e-6);
  avg_species_29438' = (GTP_cytosol - avg_species_29438)/(get_time + 1e-6);
  avg_species_390445' = (unfolded_actin_tubulin_cytosol - avg_species_390445)/(get_time + 1e-6);
  avg_species_390452' = (Prefoldin_cytosol - avg_species_390452)/(get_time + 1e-6);
  avg_species_390495' = (species_390495 - avg_species_390495)/(get_time + 1e-6);
  avg_species_390457' = (species_390457 - avg_species_390457)/(get_time + 1e-6);
  avg_species_29370' = (ADP_cytosol - avg_species_29370)/(get_time + 1e-6);
  avg_species_29372' = (Pi_cytosol - avg_species_29372)/(get_time + 1e-6);
  avg_species_201861' = (ACTB_cytosol - avg_species_201861)/(get_time + 1e-6);

  // Reactions:
  // TriC/CCT-mediated beta-actin folding involves rapid ATP-independent formation of a binary complex, followed by a slower ATP-dependent release of the native product (Gao et al., 1992). Group II chaperonins enclose substrate proteins following substrate binding through the formation of a "built- in" lid over the central cavity. Upon ATP binding, lid formation is triggered by the transition state of ATP hydrolysis (Meyer, et al., 2003).
  reaction_390453: CCT_TRiC_ATP_actin_cytosol => CCT_TRiC_ADP_cytosol + ACTB_cytosol + 8 Pi_cytosol; k_forcat_reaction_390453*CCT_TRiC_ATP_actin_cytosol; reaction_390453 is "Hydrolysis of ATP and release of folded actin from CCT/TriC";  // reactome:R-HSA-390453; reactome:R-HSA-390453; isDescribedBy pubmed:1351421 pubmed:12732144
  // The interaction between CCT and unfolded target proteins is thought to occur when CCT is in its ADP-bound state. ADP is then exchanged for ATP in CCT.
  reaction_389961: species_390501 + 8 ATP_cytosol => 8 ADP_cytosol + species_390446; k_forcat_reaction_389961*species_390501*ATP_cytosol^8; reaction_389961 is "ADP is exchanged for ATP in the (ADP:CCT/TriC):tubulin complex";  // reactome:R-HSA-389961; reactome:R-HSA-389961; isDescribedBy pubmed:9153422 pubmed:7909354
  // The interaction between CCT and unfolded target proteins is thought to occur when CCT is in its ADP-bound state. ADP is then exchanged for ATP in CCT.
  reaction_390459: CCT_TRiC_ADP_actin_cytosol + 8 ATP_cytosol => CCT_TRiC_ATP_actin_cytosol + 8 ADP_cytosol; k_forcat_reaction_390459*CCT_TRiC_ADP_actin_cytosol*ATP_cytosol^8; reaction_390459 is "Exchange of ADP for ATP in CCT/TriC:actin complex";  // reactome:R-HSA-390459; reactome:R-HSA-390459; isDescribedBy pubmed:9153422 pubmed:7909354
  // During the synthesis of actin and tubulin, the nascent ribosome-associated chains bind to the heteromeric chaperone protein, prefoldin (PFD) (Hansen et al., 1999).
  reaction_389980: unfolded_actin_tubulin_cytosol + Prefoldin_cytosol => species_390460; k_forcat_reaction_389980*unfolded_actin_tubulin_cytosol*Prefoldin_cytosol; reaction_389980 is "unfolded actin/tubulin associates with prefoldin";  // reactome:R-HSA-389980; reactome:R-HSA-389980; isDescribedBy pubmed:10209023
  // Group II chaperonins enclose substrate proteins following substrate binding through the formation of a "built- in" lid over the central cavity. Upon ATP binding, lid formation is triggered by the transition state of ATP hydrolysis (Meyer, et al., 2003). In the case of CCT-mediated tubulin folding, one or more rounds of ATP hydrolysis are likely required before the association of non-exchangeable GTP with chaperonin-bound alpha tubulin.
  reaction_389954: GTP_cytosol + species_390446 => CCT_TRiC_ADP_cytosol + species_390457 + 8 Pi_cytosol; k_forcat_reaction_389954*GTP_cytosol*species_390446; reaction_389954 is "Hydrolysis of ATP and release of tubulin folding intermediate from CCT/TriC";  // reactome:R-HSA-389954; reactome:R-HSA-389954; isDescribedBy pubmed:12732144
  // Unfolded actins and tubulins compete efficiently for binding to TriC/CCT and their chaperonin binding sites appear to be at least in part overlapping (Melki et al., 1993).
  reaction_389970: CCT_TRiC_ADP_cytosol + species_390460 => species_390495 + Prefoldin_cytosol; k_forcat_reaction_389970*CCT_TRiC_ADP_cytosol*species_390460; reaction_389970 is "Actin/tubulin:prefoldin complex associates with CCT/TriC";  // reactome:R-HSA-389970; reactome:R-HSA-389970; isDescribedBy pubmed:8104191
  degredete_output_species_390495: species_390495 => ; scale_parameter*k_output_species_390495*species_390495; degredete_output_species_390495 is "Degredate the output species of the pathway: species_390495";
  degredete_output_species_390457: species_390457 => ; scale_parameter*k_output_species_390457*species_390457; degredete_output_species_390457 is "Degredate the output species of the pathway: species_390457";
  degredete_output_species_29370: ADP_cytosol => ; scale_parameter*k_output_species_29370*ADP_cytosol; degredete_output_species_29370 is "Degredate the output species of the pathway: species_29370";
  degredete_output_species_29372: Pi_cytosol => ; scale_parameter*k_output_species_29372*Pi_cytosol; degredete_output_species_29372 is "Degredate the output species of the pathway: species_29372";
  degredete_output_species_201861: ACTB_cytosol => ; scale_parameter*k_output_species_201861*ACTB_cytosol; degredete_output_species_201861 is "Degredate the output species of the pathway: species_201861";
  generate_input_species_390445: => unfolded_actin_tubulin_cytosol; scale_parameter*k_input_species_390445; generate_input_species_390445 is "Create input species of the pathway: species_390445";
  generate_input_species_29438: => GTP_cytosol; scale_parameter*k_input_species_29438; generate_input_species_29438 is "Create input species of the pathway: species_29438";
  generate_input_species_113592: => ATP_cytosol; scale_parameter*k_input_species_113592; generate_input_species_113592 is "Create input species of the pathway: species_113592";
  generate_input_species_390476: => CCT_TRiC_ADP_actin_cytosol; scale_parameter*k_input_species_390476; generate_input_species_390476 is "Create input species of the pathway: species_390476";
  generate_input_species_390501: => species_390501; scale_parameter*k_input_species_390501; generate_input_species_390501 is "Create input species of the pathway: species_390501";
end
