// SBML level 3 version 1
// SBML generated from Reactome version 92 on 4/23/25, 5:52 PM using JSBML version 1.5.

model pathway_5637812()
  // Signaling by EGFRvIII in Cancer
  // EGFRvIII (EGFR V30_R297delinsG) is the most prevalent EGFR variant in glioblastoma, but it is also found in other cancer types. In-frame deletion of the ligand binding domain in EGFRvIII is frequently accompanied with genomic amplification, resulting in over-expression of EGFRvIII. EGFRvIII dimerizes and autophosphorylates spontaneously and is therefore constitutively active (Fernandes et al. 2001)
  // reactome:R-HSA-5637812
  // isDescribedBy pubmed:11087732

  // Compartments:
  compartment plasma_membrane = 5.235988e-22;  // GO:0005886
  compartment cytosol = 1.408e-12;  // GO:0005829
  compartment extracellular_region;  // GO:0005576

  // Species:
  // Derived from a Reactome EntityWithAccessionedSequence. This is a protein
  species p_4Y_PLCG1_plasma_membrane in plasma_membrane = 0; p_4Y_PLCG1_plasma_membrane is "p-4Y-PLCG1 [plasma membrane]";  // uniprot:P19174 reactome:R-HSA-167679; isHomologTo reactome:R-MMU-167679 reactome:R-RNO-167679 reactome:R-CFA-167679 reactome:R-BTA-167679
  // Derived from a Reactome Complex. Here is Reactomes nested structure for this complex: (2xQ16543, 2xP07900, P00533). Reactome uses a nested structure for complexes, which cannot be fully represented in SBML Level 3 Version 1 core
  species species_1248004 in plasma_membrane; species_1248004 is "EGFRvIII mutant:HSP90:CDC37 [plasma membrane]";  // reactome:R-HSA-1248004; hasPart uniprot:Q16543 uniprot:P07900 uniprot:P00533
  // Derived from a Reactome Complex. Here is Reactomes nested structure for this complex: (2xQ16543). Reactome uses a nested structure for complexes, which cannot be fully represented in SBML Level 3 Version 1 core
  species CDC37_cytosol in cytosol; CDC37_cytosol is "CDC37 [cytosol]";  // reactome:R-HSA-1225828; hasPart uniprot:Q16543; isHomologTo reactome:R-MMU-1225828 reactome:R-RNO-1225828 reactome:R-CFA-1225828 reactome:R-BTA-1225828
  // Derived from a Reactome Complex. Here is Reactomes nested structure for this complex: (Q07889, 4xQ16543, P62993, 4xP07900, 2xP00533). Reactome uses a nested structure for complexes, which cannot be fully represented in SBML Level 3 Version 1 core
  species species_5637697 in plasma_membrane = 0; species_5637697 is "p-5Y-EGFRvIII:GRB2:SOS1 [plasma membrane]";  // reactome:R-HSA-5637697; hasPart uniprot:Q07889 uniprot:Q16543 uniprot:P62993 uniprot:P07900
  // Derived from a Reactome Complex. Here is Reactomes nested structure for this complex: (2xP07900). Reactome uses a nested structure for complexes, which cannot be fully represented in SBML Level 3 Version 1 core
  species HSP90_cytosol in cytosol; HSP90_cytosol is "HSP90 [cytosol]";  // isDescribedBy pubmed:14718169; reactome:R-HSA-1221657; hasPart uniprot:P07900; isHomologTo reactome:R-MMU-1221657 reactome:R-RNO-1221657 reactome:R-CFA-1221657 reactome:R-BTA-1221657
  // Derived from a Reactome Complex. Here is Reactomes nested structure for this complex: (P01112, P01116, 58189, P01116, P01111). Reactome uses a nested structure for complexes, which cannot be fully represented in SBML Level 3 Version 1 core
  species p21_RAS_GDP_plasma_membrane in plasma_membrane; p21_RAS_GDP_plasma_membrane is "p21 RAS:GDP [plasma membrane]";  // reactome:R-HSA-109796; hasPart uniprot:P01112 uniprot:P01116 CHEBI:58189 uniprot:P01111; isHomologTo reactome:R-MMU-109796 reactome:R-RNO-109796 reactome:R-CFA-109796 reactome:R-BTA-109796
  // Derived from a Reactome SimpleEntity. This is a small compound
  species PI_4_5_P2_plasma_membrane in plasma_membrane; PI_4_5_P2_plasma_membrane is "PI(4,5)P2 [plasma membrane]";  // CHEBI:58456 reactome:R-ALL-179856
  // Derived from a Reactome SimpleEntity. This is a small compound
  species GTP_cytosol in cytosol; GTP_cytosol is "GTP [cytosol]";  // CHEBI:37565 reactome:R-ALL-29438
  // Derived from a Reactome Complex. Here is Reactomes nested structure for this complex: (P19174, 4xQ16543, 4xP07900, 2xP00533). Reactome uses a nested structure for complexes, which cannot be fully represented in SBML Level 3 Version 1 core
  species species_5637698 in plasma_membrane; species_5637698 is "p-5Y-EGFRvIII:PLCG1 [plasma membrane]";  // reactome:R-HSA-5637698; hasPart uniprot:P19174 uniprot:Q16543 uniprot:P07900 uniprot:P00533
  // Derived from a Reactome Complex. Here is Reactomes nested structure for this complex: (4xQ16543, 4xP07900, 2xP00533). Reactome uses a nested structure for complexes, which cannot be fully represented in SBML Level 3 Version 1 core
  species species_1248010 in plasma_membrane; species_1248010 is "EGFRvIII mutant dimer [plasma membrane]";  // reactome:R-HSA-1248010; hasPart uniprot:Q16543 uniprot:P07900 uniprot:P00533
  // Derived from a Reactome Complex. Here is Reactomes nested structure for this complex: (P62993, Q13480). Reactome uses a nested structure for complexes, which cannot be fully represented in SBML Level 3 Version 1 core
  species GRB2_GAB1_cytosol in cytosol; GRB2_GAB1_cytosol is "GRB2:GAB1 [cytosol]";  // reactome:R-HSA-179849; hasPart uniprot:P62993 uniprot:Q13480; isHomologTo reactome:R-MMU-179849 reactome:R-RNO-179849 reactome:R-CFA-179849 reactome:R-BTA-179849
  // Derived from a Reactome Complex. Here is Reactomes nested structure for this complex: (P27986, P42336). Reactome uses a nested structure for complexes, which cannot be fully represented in SBML Level 3 Version 1 core
  species PIK3CA_PIK3R1_cytosol in cytosol; PIK3CA_PIK3R1_cytosol is "PIK3CA:PIK3R1 [cytosol]";  // reactome:R-HSA-1806218; hasPart uniprot:P27986 uniprot:P42336; isHomologTo reactome:R-MMU-1806218 reactome:R-RNO-1806218 reactome:R-CFA-1806218 reactome:R-BTA-1806218
  // Derived from a Reactome EntityWithAccessionedSequence. This is a protein
  species EGF_extracellular_region in extracellular_region; EGF_extracellular_region is "EGF [extracellular region]";  // uniprot:P01133 reactome:R-HSA-179863; isHomologTo reactome:R-MMU-179863 reactome:R-RNO-179863 reactome:R-CFA-179863 reactome:R-SSC-179863
  // Derived from a Reactome Complex. Here is Reactomes nested structure for this complex: (P19174, 4xQ16543, 4xP07900, 2xP00533). Reactome uses a nested structure for complexes, which cannot be fully represented in SBML Level 3 Version 1 core
  species species_5637706 in plasma_membrane; species_5637706 is "p-5Y-EGFRvIII:p-Y771,Y783,Y1254-PLCG1 [plasma membrane]";  // reactome:R-HSA-5637706; hasPart uniprot:P19174 uniprot:Q16543 uniprot:P07900 uniprot:P00533
  // Derived from a Reactome SimpleEntity. This is a small compound
  species ADP_cytosol in cytosol = 0; ADP_cytosol is "ADP [cytosol]";  // CHEBI:456216 reactome:R-ALL-29370
  // Derived from a Reactome EntityWithAccessionedSequence. This is a protein
  // EGFR V30_R297delinsG mutant of EGFR, commonly known as EGFRvIII, is found in ~25% high-grade glioblastomas and can also be found in squamous cell carcinoma of the lung. EGFRvIII lacks the ligand biding domain and is constitutively active.
  species EGFRvIII_plasma_membrane in plasma_membrane; EGFRvIII_plasma_membrane is "EGFRvIII [plasma membrane]";  // uniprot:P00533 reactome:R-HSA-1214162
  // Derived from a Reactome Complex. Here is Reactomes nested structure for this complex: (P01112, P01116, 37565, P01116, P01111). Reactome uses a nested structure for complexes, which cannot be fully represented in SBML Level 3 Version 1 core
  species p21_RAS_GTP_plasma_membrane in plasma_membrane = 0; p21_RAS_GTP_plasma_membrane is "p21 RAS:GTP [plasma membrane]";  // reactome:R-HSA-109783; hasPart uniprot:P01112 uniprot:P01116 CHEBI:37565 uniprot:P01111; isHomologTo reactome:R-MMU-109783 reactome:R-RNO-109783 reactome:R-CFA-109783 reactome:R-BTA-109783
  // Derived from a Reactome Complex. Here is Reactomes nested structure for this complex: (Q07889, P62993). Reactome uses a nested structure for complexes, which cannot be fully represented in SBML Level 3 Version 1 core
  species GRB2_1_SOS1_cytosol in cytosol; GRB2_1_SOS1_cytosol is "GRB2-1:SOS1 [cytosol]";  // isDescribedBy pubmed:19665053 pubmed:8493579; reactome:R-HSA-109797; hasPart uniprot:Q07889 uniprot:P62993; isHomologTo reactome:R-MMU-109797 reactome:R-RNO-109797 reactome:R-CFA-109797 reactome:R-BTA-109797
  // Derived from a Reactome SimpleEntity. This is a small compound
  species GDP_cytosol in cytosol = 0; GDP_cytosol is "GDP [cytosol]";  // CHEBI:58189 reactome:R-ALL-29420
  // Derived from a Reactome Complex. Here is Reactomes nested structure for this complex: (4xQ16543, 4xP07900, 2xP00533, P29353). Reactome uses a nested structure for complexes, which cannot be fully represented in SBML Level 3 Version 1 core
  species species_5637701 in plasma_membrane; species_5637701 is "p-5Y-EGFRvIII:SHC1 [plasma membrane]";  // reactome:R-HSA-5637701; hasPart uniprot:Q16543 uniprot:P07900 uniprot:P00533 uniprot:P29353
  // Derived from a Reactome SimpleEntity. This is a small compound
  species PI_3_4_5_P3_plasma_membrane in plasma_membrane = 0; PI_3_4_5_P3_plasma_membrane is "PI(3,4,5)P3 [plasma membrane]";  // CHEBI:57836 reactome:R-ALL-179838
  // Derived from a Reactome Complex. Here is Reactomes nested structure for this complex: (P62993, 4xQ16543, 4xP07900, P27986, Q13480, 2xP00533, P42336). Reactome uses a nested structure for complexes, which cannot be fully represented in SBML Level 3 Version 1 core
  species species_5637693 in plasma_membrane = 0; species_5637693 is "p-5Y-EGFRvIII:GRB2:GAB1:PI3K [plasma membrane]";  // reactome:R-HSA-5637693; hasPart uniprot:P62993 uniprot:Q16543 uniprot:P07900 uniprot:P27986
  // Derived from a Reactome EntityWithAccessionedSequence. This is a protein
  species SHC1_cytosol in cytosol; SHC1_cytosol is "SHC1 [cytosol]";  // uniprot:P29353 reactome:R-HSA-74680; isHomologTo reactome:R-MMU-74680 reactome:R-RNO-74680 reactome:R-CFA-74680 reactome:R-BTA-74680
  // Derived from a Reactome EntityWithAccessionedSequence. This is a protein
  species PLCG1_plasma_membrane in plasma_membrane; PLCG1_plasma_membrane is "PLCG1 [plasma membrane]";  // uniprot:P19174 reactome:R-HSA-167682; isHomologTo reactome:R-MMU-167682 reactome:R-RNO-167682 reactome:R-CFA-167682 reactome:R-BTA-167682
  // Derived from a Reactome Complex. Here is Reactomes nested structure for this complex: (4xQ16543, 4xP07900, 2xP00533, P29353). Reactome uses a nested structure for complexes, which cannot be fully represented in SBML Level 3 Version 1 core
  species species_5637703 in plasma_membrane; species_5637703 is "p-5Y-EGFRvIII:p-Y349,Y350-SHC1 [plasma membrane]";  // reactome:R-HSA-5637703; hasPart uniprot:Q16543 uniprot:P07900 uniprot:P00533 uniprot:P29353
  // Derived from a Reactome Complex. Here is Reactomes nested structure for this complex: (4xQ16543, 4xP07900, 2xP00533). Reactome uses a nested structure for complexes, which cannot be fully represented in SBML Level 3 Version 1 core
  species species_1248654 in plasma_membrane; species_1248654 is "p-5Y-EGFRvIII mutant dimer [plasma membrane]";  // reactome:R-HSA-1248654; hasPart uniprot:Q16543 uniprot:P07900 uniprot:P00533
  // Derived from a Reactome SimpleEntity. This is a small compound
  species ATP_cytosol in cytosol; ATP_cytosol is "ATP [cytosol]";  // CHEBI:30616 reactome:R-ALL-113592
  // Derived from a Reactome Complex. Here is Reactomes nested structure for this complex: (Q07889, 4xQ16543, P62993, 4xP07900, 2xP00533, P29353). Reactome uses a nested structure for complexes, which cannot be fully represented in SBML Level 3 Version 1 core
  species species_5637704 in plasma_membrane = 0; species_5637704 is "p-5Y-EGFRvIII:p-Y349,Y350-SHC1:GRB2:SOS1 [plasma membrane]";  // reactome:R-HSA-5637704; hasPart uniprot:Q07889 uniprot:Q16543 uniprot:P62993 uniprot:P07900
  // Derived from a Reactome Complex. Here is Reactomes nested structure for this complex: (P62993, 4xQ16543, 4xP07900, Q13480, 2xP00533). Reactome uses a nested structure for complexes, which cannot be fully represented in SBML Level 3 Version 1 core
  species species_5637694 in plasma_membrane; species_5637694 is "p-5Y-EGFRvIII:GRB2:GAB1 [plasma membrane]";  // reactome:R-HSA-5637694; hasPart uniprot:P62993 uniprot:Q16543 uniprot:P07900 uniprot:Q13480
  // Derived from a Reactome EntityWithAccessionedSequence. This is a protein
  species CBL_cytosol in cytosol; CBL_cytosol is "CBL [cytosol]";  // uniprot:P22681 reactome:R-HSA-112199; isHomologTo reactome:R-MMU-112199 reactome:R-RNO-112199 reactome:R-CFA-112199 reactome:R-BTA-112199
  species avg_species_1248004 in plasma_membrane = 0; avg_species_1248004 is "Average of species_1248004";
  species avg_species_1225828 in cytosol = 0; avg_species_1225828 is "Average of species_1225828";
  species avg_species_1221657 in cytosol = 0; avg_species_1221657 is "Average of species_1221657";
  species avg_species_109796 in plasma_membrane = 0; avg_species_109796 is "Average of species_109796";
  species avg_species_179856 in plasma_membrane = 0; avg_species_179856 is "Average of species_179856";
  species avg_species_29438 in cytosol = 0; avg_species_29438 is "Average of species_29438";
  species avg_species_5637698 in plasma_membrane = 0; avg_species_5637698 is "Average of species_5637698";
  species avg_species_1248010 in plasma_membrane = 0; avg_species_1248010 is "Average of species_1248010";
  species avg_species_179849 in cytosol = 0; avg_species_179849 is "Average of species_179849";
  species avg_species_1806218 in cytosol = 0; avg_species_1806218 is "Average of species_1806218";
  species avg_species_179863 in extracellular_region = 0; avg_species_179863 is "Average of species_179863";
  species avg_species_5637706 in plasma_membrane = 0; avg_species_5637706 is "Average of species_5637706";
  species avg_species_1214162 in plasma_membrane = 0; avg_species_1214162 is "Average of species_1214162";
  species avg_species_109797 in cytosol = 0; avg_species_109797 is "Average of species_109797";
  species avg_species_5637701 in plasma_membrane = 0; avg_species_5637701 is "Average of species_5637701";
  species avg_species_74680 in cytosol = 0; avg_species_74680 is "Average of species_74680";
  species avg_species_167682 in plasma_membrane = 0; avg_species_167682 is "Average of species_167682";
  species avg_species_5637703 in plasma_membrane = 0; avg_species_5637703 is "Average of species_5637703";
  species avg_species_1248654 in plasma_membrane = 0; avg_species_1248654 is "Average of species_1248654";
  species avg_species_113592 in cytosol = 0; avg_species_113592 is "Average of species_113592";
  species avg_species_5637694 in plasma_membrane = 0; avg_species_5637694 is "Average of species_5637694";
  species avg_species_112199 in cytosol = 0; avg_species_112199 is "Average of species_112199";
  species avg_species_5637704 in plasma_membrane = 0; avg_species_5637704 is "Average of species_5637704";
  species avg_species_5637693 in plasma_membrane = 0; avg_species_5637693 is "Average of species_5637693";
  species avg_species_29420 in cytosol = 0; avg_species_29420 is "Average of species_29420";
  species avg_species_109783 in plasma_membrane = 0; avg_species_109783 is "Average of species_109783";
  species avg_species_29370 in cytosol = 0; avg_species_29370 is "Average of species_29370";
  species avg_species_5637697 in plasma_membrane = 0; avg_species_5637697 is "Average of species_5637697";
  species avg_species_179838 in plasma_membrane = 0; avg_species_179838 is "Average of species_179838";
  species avg_species_167679 in plasma_membrane = 0; avg_species_167679 is "Average of species_167679";

  // Parameters:
  scale_parameter = 1;
  k_output_species_5637704 = 1;
  k_output_species_5637693 = 1;
  k_output_species_29420 = 1;
  k_output_species_109783 = 1;
  k_output_species_29370 = 1;
  k_output_species_5637697 = 1;
  k_output_species_179838 = 1;
  k_output_species_167679 = 1;
  k_input_species_112199 = 1e-7;
  k_input_species_1225828 = 1e-7;
  k_input_species_179849 = 1e-7;
  k_input_species_109796 = 1e-7;
  k_input_species_179856 = 1e-7;
  k_input_species_1214162 = 1e-7;
  k_input_species_29438 = 1e-7;
  k_input_species_1221657 = 1e-7;
  k_input_species_1806218 = 1e-7;
  k_input_species_179863 = 1e-7;
  k_input_species_113592 = 1e-7;
  k_input_species_109797 = 1e-7;
  k_input_species_74680 = 1e-7;
  k_input_species_167682 = 1e-7;
  k_forcat_reaction_5637770 = 1;
  k_forcat_reaction_5637792 = 1;
  k_forcat_reaction_5637794 = 1;
  k_forcat_reaction_1248002 = 1;
  k_forcat_reaction_5637806 = 1;
  k_activator_modifierspeciesreference_5637806_catalyst_5637697 = 1;
  k_forcat_reaction_1248655 = 1;
  k_activator_modifierspeciesreference_1248655_catalyst_1248010 = 1;
  k_forcat_reaction_5637765 = 1;
  k_forcat_reaction_5637800 = 1;
  k_forcat_reaction_5637801 = 1;
  k_activator_modifierspeciesreference_5637801_catalyst_5637693 = 1;
  k_forcat_reaction_5637795 = 1;
  k_activator_modifierspeciesreference_5637795_catalyst_5637698 = 1;
  k_forcat_reaction_5637796 = 1;
  k_activator_modifierspeciesreference_5637796_catalyst_5637701 = 1;
  k_forcat_reaction_5637798 = 1;
  k_forcat_reaction_5637808 = 1;
  k_activator_modifierspeciesreference_5637808_catalyst_5637704 = 1;
  k_forcat_reaction_1247999 = 1;
  k_forcat_reaction_5637764 = 1;
  k_forcat_reaction_5638137 = 1;
  k_forcat_reaction_5637766 = 1;
  get_time = 0; get_time is "Auxiliary variable used in place of time due to naming restrictions";

  // Rate rules:
  get_time' = 1;
  avg_species_1248004' = (species_1248004 - avg_species_1248004)/(get_time + 1e-6);
  avg_species_1225828' = (CDC37_cytosol - avg_species_1225828)/(get_time + 1e-6);
  avg_species_1221657' = (HSP90_cytosol - avg_species_1221657)/(get_time + 1e-6);
  avg_species_109796' = (p21_RAS_GDP_plasma_membrane - avg_species_109796)/(get_time + 1e-6);
  avg_species_179856' = (PI_4_5_P2_plasma_membrane - avg_species_179856)/(get_time + 1e-6);
  avg_species_29438' = (GTP_cytosol - avg_species_29438)/(get_time + 1e-6);
  avg_species_5637698' = (species_5637698 - avg_species_5637698)/(get_time + 1e-6);
  avg_species_1248010' = (species_1248010 - avg_species_1248010)/(get_time + 1e-6);
  avg_species_179849' = (GRB2_GAB1_cytosol - avg_species_179849)/(get_time + 1e-6);
  avg_species_1806218' = (PIK3CA_PIK3R1_cytosol - avg_species_1806218)/(get_time + 1e-6);
  avg_species_179863' = (EGF_extracellular_region - avg_species_179863)/(get_time + 1e-6);
  avg_species_5637706' = (species_5637706 - avg_species_5637706)/(get_time + 1e-6);
  avg_species_1214162' = (EGFRvIII_plasma_membrane - avg_species_1214162)/(get_time + 1e-6);
  avg_species_109797' = (GRB2_1_SOS1_cytosol - avg_species_109797)/(get_time + 1e-6);
  avg_species_5637701' = (species_5637701 - avg_species_5637701)/(get_time + 1e-6);
  avg_species_74680' = (SHC1_cytosol - avg_species_74680)/(get_time + 1e-6);
  avg_species_167682' = (PLCG1_plasma_membrane - avg_species_167682)/(get_time + 1e-6);
  avg_species_5637703' = (species_5637703 - avg_species_5637703)/(get_time + 1e-6);
  avg_species_1248654' = (species_1248654 - avg_species_1248654)/(get_time + 1e-6);
  avg_species_113592' = (ATP_cytosol - avg_species_113592)/(get_time + 1e-6);
  avg_species_5637694' = (species_5637694 - avg_species_5637694)/(get_time + 1e-6);
  avg_species_112199' = (CBL_cytosol - avg_species_112199)/(get_time + 1e-6);
  avg_species_5637704' = (species_5637704 - avg_species_5637704)/(get_time + 1e-6);
  avg_species_5637693' = (species_5637693 - avg_species_5637693)/(get_time + 1e-6);
  avg_species_29420' = (GDP_cytosol - avg_species_29420)/(get_time + 1e-6);
  avg_species_109783' = (p21_RAS_GTP_plasma_membrane - avg_species_109783)/(get_time + 1e-6);
  avg_species_29370' = (ADP_cytosol - avg_species_29370)/(get_time + 1e-6);
  avg_species_5637697' = (species_5637697 - avg_species_5637697)/(get_time + 1e-6);
  avg_species_179838' = (PI_3_4_5_P3_plasma_membrane - avg_species_179838)/(get_time + 1e-6);
  avg_species_167679' = (p_4Y_PLCG1_plasma_membrane - avg_species_167679)/(get_time + 1e-6);

  // Reactions:
  // Direct binding of GRB2:SOS1 complex to phosphorylated homodimers of EGFRvIII cancer mutant has not been tested. GRB2 binds to phosphorylated tyrosine residues Y1068 and Y1086 (corresponding to Y1092 and Y1110, respectively, when counting from the first amino acid of the EGFR precursor, prior to cleavage of the 24-amino acid signal peptide at the N-terminus). Phosphorylation of Y1068 (i.e. Y1092) has been directly demonstrated in EGFRvIII mutant (Huang et al. 2007).
  reaction_5637770: GRB2_1_SOS1_cytosol + species_1248654 => species_5637697; k_forcat_reaction_5637770*GRB2_1_SOS1_cytosol*species_1248654; reaction_5637770 is "Binding of GRB2:SOS1 complex to phosphorylated EGFRvIII";  // reactome:R-HSA-5637770; isDescribedBy pubmed:17646646; reactome:R-HSA-5637770; occursIn DOID:162
  // Tyrosine residue Y992 (corresponding to Y1016 when counting from the first amino acid of the EGFR precursor, prior to cleavage of the 24-amino acid signal peptide at the N-terminus), a docking site for PLC-gamma 1 (PLCG1), is phosphorylated in EGFRvIII cancer mutant and expected to recruit PLC-gamma 1 in the same way as the wild-type EGFR receptor (Grandal et al. 2007).
  reaction_5637792: species_1248654 + PLCG1_plasma_membrane => species_5637698; k_forcat_reaction_5637792*species_1248654*PLCG1_plasma_membrane; reaction_5637792 is "PLC-gamma 1 binds to p-EGFRvIII mutant";  // reactome:R-HSA-5637792; isDescribedBy pubmed:17372273; reactome:R-HSA-5637792; occursIn DOID:162
  // In EGFRvIII mutant, Y1069 (i.e. Y1045 in the mature protein) is not phosphorylated (Han et al. 2006, Grandal et al. 2007). Han et al. detected no CBL binding to EGFRvIII mutant (Han et al. 2006), while Grandal et al. detected very little binding, which they explained by indirect recruitment of CBL to EGFRvIII through GRB2 (Grandal et al. 2007).
  EGFRvIII_does_not_bind_CBL: species_1248654 + 2 CBL_cytosol => ; k_forcat_reaction_5637794*species_1248654*CBL_cytosol^2;  // reactome:R-HSA-5637794; isDescribedBy pubmed:16969069 pubmed:17372273; reactome:R-HSA-5637794; occursIn DOID:162
  // EGFRvIII mutant lacks the ligand binding domain and is therefore unable to bind EGFR ligands, but is able to dimerize spontaneously. Self-dimerization may be dependent on N-linked glycosylation.
  reaction_1248002: 2 species_1248004 => species_1248010; k_forcat_reaction_1248002*species_1248004^2; reaction_1248002 is "Ligand-independent dimerization of EGFRvIII mutant";  // reactome:R-HSA-1248002; isDescribedBy pubmed:11087732; reactome:R-HSA-1248002; occursIn DOID:162
  // Based on the wild-type EGFR signaling, it is assumed that the guanine nucleotide exchange factor SOS1 interacts with phosphorylated EGFRvIII mutant through the adaptor protein, GRB2. Upon formation of this complex, SOS1 activates RAS by promoting GDP release and GTP binding. Although this reaction has not been directly confirmed for EGFRvIII cancer mutant, RAS-MAPK signaling cascade is activated in cells expressing EGFRvIII (Montgomery et al.1995).
  reaction_5637806: p21_RAS_GDP_plasma_membrane + GTP_cytosol => p21_RAS_GTP_plasma_membrane + GDP_cytosol; species_5637697^10/(k_activator_modifierspeciesreference_5637806_catalyst_5637697^10 + species_5637697^10)*k_forcat_reaction_5637806*p21_RAS_GDP_plasma_membrane*GTP_cytosol; reaction_5637806 is "SOS-mediated nucleotide exchange of RAS (mediated by GRB2:SOS1 in complex with p-EGFRvIII)";  // modifiers: species_5637697; reactome:R-HSA-5637806; isDescribedBy pubmed:8530489; reactome:R-HSA-5637806; GO:0005085
  // Upon dimerization, EGFRvIII mutants trans-autophosphorylate on tyrosine residues Y1016 i.e. Y992 in the mature protein, Y1092 i.e. Y1068 in the mature protein, Y1110 i.e. Y0186 in the mature protein, Y1172 i.e. Y1148 in the mature protein and Y1197 i.e. Y1173 in the mature protein, while the tyrosine residue Y1069 i.e. Y1045 in the mature protein, a docking site for CBL, remains either unphosphorylated or hypophosphorylated, allowing EGFRvIII to activate downstream signaling cascades while escaping downregulation.
  reaction_1248655: 10 ATP_cytosol + species_1248010 => species_1248654 + 10 ADP_cytosol; species_1248010^10/(k_activator_modifierspeciesreference_1248655_catalyst_1248010^10 + species_1248010^10)*k_forcat_reaction_1248655*ATP_cytosol^10*species_1248010; reaction_1248655 is "Trans-autophosphorylation of EGFRvIII mutant dimers";  // reactome:R-HSA-1248655; isDescribedBy pubmed:16969069 pubmed:17646646; reactome:R-HSA-1248655; GO:0004713
  // EGFRvIII cancer mutant is assumed to recruit the PI3K complex PIK3CA:PIK3R1 in a manner similar to wild-type EGFR (Rodrigues et al. 2000).
  reaction_5637765: PIK3CA_PIK3R1_cytosol + species_5637694 => species_5637693; k_forcat_reaction_5637765*PIK3CA_PIK3R1_cytosol*species_5637694; reaction_5637765 is "Binding of PI3K to complex of GRB2:GAB1 and p-EGFRvIII";  // reactome:R-HSA-5637765; isDescribedBy pubmed:10648629; reactome:R-HSA-5637765; occursIn DOID:162
  // Once phosphorylated, PLC-gamma 1 is expected to dissociate from phosphorylated EGFRvIII cancer mutant and induce downstream signaling in the same way it does when activated by the wild-type EGFR. However, except for the phosphorylation of PLCG1 binding site in EGFRvIII (Grandal et al. 2007), other events involved in activation of PLCG1 signaling have not been studied in cells expressing EGFRvIII.
  reaction_5637800: species_5637706 => p_4Y_PLCG1_plasma_membrane + species_1248654; k_forcat_reaction_5637800*species_5637706; reaction_5637800 is "Dissociation of phosphorylated PLC-gamma 1 from p-EGFRvIII mutant";  // reactome:R-HSA-5637800; isDescribedBy pubmed:17372273 pubmed:10579907; reactome:R-HSA-5637800; occursIn DOID:162
  // The kinase activity of PI3K mediates the phosphorylation of PIP2 to form PIP3. It is assumed that EGFRvIII cancer mutant induces PI3K/AKT signaling in a manner similar to wild-type EGFR. Accordingly, activation of PI3K/AKT signaling cascade has been demonstrated in cells expressing EGFRvIII (Lammering et al. 2003, Li et al. 2004)
  reaction_5637801: ATP_cytosol + PI_4_5_P2_plasma_membrane => PI_3_4_5_P3_plasma_membrane + ADP_cytosol; species_5637693^10/(k_activator_modifierspeciesreference_5637801_catalyst_5637693^10 + species_5637693^10)*k_forcat_reaction_5637801*ATP_cytosol*PI_4_5_P2_plasma_membrane; reaction_5637801 is "Conversion of PIP2 to PIP3 by PI3K bound to phosphorylated EGFRvIII";  // modifiers: species_5637693; reactome:R-HSA-5637801; isDescribedBy pubmed:12944901 pubmed:15077177; reactome:R-HSA-5637801; GO:0046934
  // Once recruited, PLC-gamma 1 is assumed to be phosphorylated by EGFRvIII cancer mutant in the same way it is phosphorylated by the wild-type EGFR (Meisenhelder et al. 1989, Wahl et al. 1990).
  reaction_5637795: 4 ATP_cytosol + species_5637698 => species_5637706 + 4 ADP_cytosol; species_5637698^10/(k_activator_modifierspeciesreference_5637795_catalyst_5637698^10 + species_5637698^10)*k_forcat_reaction_5637795*ATP_cytosol^4*species_5637698; reaction_5637795 is "Phosphorylation of PLC-gamma 1 by p-EGFRvIII mutant";  // reactome:R-HSA-5637795; isDescribedBy pubmed:2472219 pubmed:1689311; reactome:R-HSA-5637795; GO:0004713
  // EGFRvIII cancer mutant was not directly tested for its ability to phosphorylate SHC1, but is assumed to interact with SHC1 in the same way as the wild-type EGFR protein (Soler et al. 1994, VanderKuur et al. 1995).
  reaction_5637796: species_5637701 + 2 ATP_cytosol => species_5637703 + 2 ADP_cytosol; species_5637701^10/(k_activator_modifierspeciesreference_5637796_catalyst_5637701^10 + species_5637701^10)*k_forcat_reaction_5637796*species_5637701*ATP_cytosol^2; reaction_5637796 is "Phosphorylation of SHC1 by p-5Y-EGFRvIII";  // reactome:R-HSA-5637796; isDescribedBy pubmed:8036006 pubmed:7535773; reactome:R-HSA-5637796; GO:0004713
  // Recruitment of GRB2:SOS1 complex by SHC1 bound to phosphorylated dimers of EGFRvIII cancer mutant has not been directly tested, but is assumed to happen in the same way it happens with the SHC1 bound to the phosphorylated homodimer of wild-type EGFR (Chardin et al. 1993).
  reaction_5637798: GRB2_1_SOS1_cytosol + species_5637703 => species_5637704; k_forcat_reaction_5637798*GRB2_1_SOS1_cytosol*species_5637703; reaction_5637798 is "Phosphorylated SHC1 in complex with p-5Y-EGFRvIII recruits GRB2:SOS1 complex";  // reactome:R-HSA-5637798; isDescribedBy pubmed:8493579; reactome:R-HSA-5637798; occursIn DOID:162
  // SOS1 is the guanine nucleotide exchange factor (GEF) for RAS. SOS1, recruited by GRB2 bound to p-SHC1:p-EGFRvIII mutant, is assumed to activate RAS nucleotide exchange from the inactive form (bound to GDP) to an active form (bound to GTP). Although this reaction has not been shown to occur directly for EGFRvIII cancer mutant, activation of RAF/MAP kinase cascade has been demonstrated in cells expressing EGFRvIII (Montgomery et al. 1995).
  reaction_5637808: p21_RAS_GDP_plasma_membrane + GTP_cytosol => p21_RAS_GTP_plasma_membrane + GDP_cytosol; species_5637704^10/(k_activator_modifierspeciesreference_5637808_catalyst_5637704^10 + species_5637704^10)*k_forcat_reaction_5637808*p21_RAS_GDP_plasma_membrane*GTP_cytosol; reaction_5637808 is "SOS-mediated nucleotide exchange of RAS (mediated by GRB2:SOS1 in complex with phosphorylated SHC1 and p-EGFRvIII)";  // modifiers: species_5637704; reactome:R-HSA-5637808; isDescribedBy pubmed:8530489; reactome:R-HSA-5637808; GO:0005085
  // Association of EGFRvIII mutant with HSP90 chaperone protein and its co-chaperone CDC37 is necessary for the proper functioning of mutant EGFR.
  reaction_1247999: CDC37_cytosol + HSP90_cytosol + EGFRvIII_plasma_membrane => species_1248004; k_forcat_reaction_1247999*CDC37_cytosol*HSP90_cytosol*EGFRvIII_plasma_membrane; reaction_1247999 is "EGFRvIII mutant binds chaperone proteins HSP90 and CDC37";  // reactome:R-HSA-1247999; isDescribedBy pubmed:12471035; reactome:R-HSA-1247999; occursIn DOID:162
  // Direct binding of the GRB2:GAB1 complex to phosphorylated homodimers of EGFRvIII cancer mutant has not been tested. This complex is recruted to EGFR via GRB2 binding to phosphorylated tyrosine residues Y1068 and Y1086 (corresponding to Y1092 and Y1110, respectively, when counting from the first amino acid of the EGFR precursor, prior to cleavage of the 24-amino acid signal peptide at the N-terminus). Phosphorylation of Y1068 (i.e. Y1092) has been directly demonstrated in EGFRvIII mutant (Huang et al. 2007).
  reaction_5637764: species_1248654 + GRB2_GAB1_cytosol => species_5637694; k_forcat_reaction_5637764*species_1248654*GRB2_GAB1_cytosol; reaction_5637764 is "Binding of GRB2:GAB1 complex to p-EGFRvIII mutant";  // reactome:R-HSA-5637764; isDescribedBy pubmed:17646646; reactome:R-HSA-5637764; occursIn DOID:162
  // EGFRvIII mutant lacks the ligand binding domain and is therefore unable to bind EGFR ligands (Fernandes et al. 2001).
  reaction_5638137: EGF_extracellular_region + species_1248004 => ; k_forcat_reaction_5638137*EGF_extracellular_region*species_1248004; reaction_5638137 is "EGFRvIII cancer variant does not bind EGF ligand";  // reactome:R-HSA-5638137; isDescribedBy pubmed:11087732; reactome:R-HSA-5638137; occursIn DOID:162
  // SHC1 (Src homology 2 domain-containing transforming protein) is known to bind two phosphorylated tyrosine docking sites of EGFR: Y1148 and Y1173 (corresponding to Y1172 and Y1197 when counting from the first amino acid of EGFR precursor, before the cleavage of the 24-amino acid signal peptide at the N-terminus takes place). Phosphorylation of Y1173 tyrosine residue was directly demonstrated in EGFRvIII mutant (Han et al. 2006, Grandal et al. 2007) as well as the phosphorylation of Y1148 (Huang et al. 2007). Binding of SHC1 to EGFRvIII cancer mutant has not been tested but SHC1 is assumed to bind EGFRvIII in the same way it binds wild-type EGFR.
  Binding_of_SHC1_to_p_5Y_EGFRvIII: species_1248654 + SHC1_cytosol => species_5637701; k_forcat_reaction_5637766*species_1248654*SHC1_cytosol; Binding_of_SHC1_to_p_5Y_EGFRvIII is "Binding of SHC1 to p-5Y-EGFRvIII";  // reactome:R-HSA-5637766; isDescribedBy pubmed:17372273 pubmed:16969069 pubmed:17646646; reactome:R-HSA-5637766; occursIn DOID:162
  degredete_output_species_5637704: species_5637704 => ; scale_parameter*k_output_species_5637704*species_5637704; degredete_output_species_5637704 is "Degredate the output species of the pathway: species_5637704";
  degredete_output_species_5637693: species_5637693 => ; scale_parameter*k_output_species_5637693*species_5637693; degredete_output_species_5637693 is "Degredate the output species of the pathway: species_5637693";
  degredete_output_species_29420: GDP_cytosol => ; scale_parameter*k_output_species_29420*GDP_cytosol; degredete_output_species_29420 is "Degredate the output species of the pathway: species_29420";
  degredete_output_species_109783: p21_RAS_GTP_plasma_membrane => ; scale_parameter*k_output_species_109783*p21_RAS_GTP_plasma_membrane; degredete_output_species_109783 is "Degredate the output species of the pathway: species_109783";
  degredete_output_species_29370: ADP_cytosol => ; scale_parameter*k_output_species_29370*ADP_cytosol; degredete_output_species_29370 is "Degredate the output species of the pathway: species_29370";
  degredete_output_species_5637697: species_5637697 => ; scale_parameter*k_output_species_5637697*species_5637697; degredete_output_species_5637697 is "Degredate the output species of the pathway: species_5637697";
  degredete_output_species_179838: PI_3_4_5_P3_plasma_membrane => ; scale_parameter*k_output_species_179838*PI_3_4_5_P3_plasma_membrane; degredete_output_species_179838 is "Degredate the output species of the pathway: species_179838";
  degredete_output_species_167679: p_4Y_PLCG1_plasma_membrane => ; scale_parameter*k_output_species_167679*p_4Y_PLCG1_plasma_membrane; degredete_output_species_167679 is "Degredate the output species of the pathway: species_167679";
  generate_input_species_112199: => CBL_cytosol; scale_parameter*k_input_species_112199; generate_input_species_112199 is "Create input species of the pathway: species_112199";
  generate_input_species_1225828: => CDC37_cytosol; scale_parameter*k_input_species_1225828; generate_input_species_1225828 is "Create input species of the pathway: species_1225828";
  generate_input_species_179849: => GRB2_GAB1_cytosol; scale_parameter*k_input_species_179849; generate_input_species_179849 is "Create input species of the pathway: species_179849";
  generate_input_species_109796: => p21_RAS_GDP_plasma_membrane; scale_parameter*k_input_species_109796; generate_input_species_109796 is "Create input species of the pathway: species_109796";
  generate_input_species_179856: => PI_4_5_P2_plasma_membrane; scale_parameter*k_input_species_179856; generate_input_species_179856 is "Create input species of the pathway: species_179856";
  generate_input_species_1214162: => EGFRvIII_plasma_membrane; scale_parameter*k_input_species_1214162; generate_input_species_1214162 is "Create input species of the pathway: species_1214162";
  generate_input_species_29438: => GTP_cytosol; scale_parameter*k_input_species_29438; generate_input_species_29438 is "Create input species of the pathway: species_29438";
  generate_input_species_1221657: => HSP90_cytosol; scale_parameter*k_input_species_1221657; generate_input_species_1221657 is "Create input species of the pathway: species_1221657";
  generate_input_species_1806218: => PIK3CA_PIK3R1_cytosol; scale_parameter*k_input_species_1806218; generate_input_species_1806218 is "Create input species of the pathway: species_1806218";
  generate_input_species_179863: => EGF_extracellular_region; scale_parameter*k_input_species_179863; generate_input_species_179863 is "Create input species of the pathway: species_179863";
  generate_input_species_113592: => ATP_cytosol; scale_parameter*k_input_species_113592; generate_input_species_113592 is "Create input species of the pathway: species_113592";
  generate_input_species_109797: => GRB2_1_SOS1_cytosol; scale_parameter*k_input_species_109797; generate_input_species_109797 is "Create input species of the pathway: species_109797";
  generate_input_species_74680: => SHC1_cytosol; scale_parameter*k_input_species_74680; generate_input_species_74680 is "Create input species of the pathway: species_74680";
  generate_input_species_167682: => PLCG1_plasma_membrane; scale_parameter*k_input_species_167682; generate_input_species_167682 is "Create input species of the pathway: species_167682";
end
