// SBML level 3 version 1
// SBML generated from Reactome version 93 on 6/24/25, 6:44 PM using JSBML version 1.5.

model pathway_6796648()
  // TP53 Regulates Transcription of DNA Repair Genes
  // Several DNA repair genes contain p53 response elements and their transcription is positively regulated by TP53 (p53). TP53-mediated regulation probably ensures increased protein level of DNA repair genes under genotoxic stress.TP53 directly stimulates transcription of several genes involved in DNA mismatch repair, including MSH2 (Scherer et al. 2000, Warnick et al. 2001), PMS2 and MLH1 (Chen and Sadowski 2005). TP53 also directly stimulates transcription of DDB2, involved in nucleotide excision repair (Tan and Chu 2002), and FANCC, involved in the Fanconi anemia pathway that repairs DNA interstrand crosslinks (Liebetrau et al. 1997). Other p53 targets that can influence DNA repair functions are RRM2B (Kuo et al. 2012), XPC (Fitch et al. 2003), GADD45A (Amundson et al. 2002), CDKN1A (Cazzalini et al. 2010) and PCNA (Xu and Morris 1999). Interestingly, the responsiveness of some of these DNA repair genes to p53 activation has been shown in human cells but not for orthologous mouse genes (Jegga et al. 2008, Tan and Chu 2002). Contrary to the positive modulation of nucleotide excision repair (NER) and mismatch repair (MMR), p53 can negatively modulate base excision repair (BER), by down-regulating the endonuclease APEX1 (APE1), acting in concert with SP1 (Poletto et al. 2016).Expression of several DNA repair genes is under indirect TP53 control, through TP53-mediated stimulation of cyclin K (CCNK) expression (Mori et al. 2002). CCNK is the activating cyclin for CDK12 and CDK13 (Blazek et al. 2013). The complex of CCNK and CDK12 binds and phosphorylates the C-terminal domain of the RNA polymerase II subunit POLR2A, which is necessary for efficient transcription of long DNA repair genes, including BRCA1, ATR, FANCD2, FANCI, ATM, MDC1, CHEK1 and RAD51D. Genes whose transcription is regulated by the complex of CCNK and CDK12 are mainly involved in the repair of DNA double strand breaks and/or the Fanconi anemia pathway (Blazek et al. 2011, Cheng et al. 2012, Bosken et al. 2014, Bartkowiak and Greenleaf 2015, Ekumi et al. 2015).
  // reactome:R-HSA-6796648
  // isDescribedBy pubmed:10984493 pubmed:11350971 pubmed:15781865 pubmed:11971958 pubmed:9063748 pubmed:11988847

  // Compartments:
  compartment nucleoplasm = 3.52e-13;  // GO:0005654

  // Species:
  // Derived from a Reactome EntityWithAccessionedSequence. This is a protein
  species DDB2_Gene_nucleoplasm in nucleoplasm; DDB2_Gene_nucleoplasm is "DDB2 Gene [nucleoplasm]";  // reactome:R-HSA-6806606
  // Derived from a Reactome Complex. Here is Reactomes nested structure for this complex: (ENSG00000076242, 4xP04637). Reactome uses a nested structure for complexes, which cannot be fully represented in SBML Level 3 Version 1 core
  species species_6806584 in nucleoplasm = 0; species_6806584 is "p-S15,S20-TP53 Tetramer:MLH1 Gene [nucleoplasm]";  // isDescribedBy pubmed:15781865; reactome:R-HSA-6806584; hasPart uniprot:P04637
  // Derived from a Reactome EntityWithAccessionedSequence. This is a protein
  species FANCC_nucleoplasm in nucleoplasm = 0; FANCC_nucleoplasm is "FANCC [nucleoplasm]";  // uniprot:Q00597 reactome:R-HSA-419530; isHomologTo reactome:R-MMU-419530 reactome:R-RNO-419530 reactome:R-CFA-419530 reactome:R-BTA-419530
  // Derived from a Reactome Complex. Here is Reactomes nested structure for this complex: (ENST00000419585, Q15370, Q14241, Q9Y5B9, Q9H3P2, ENST00000345365, P18615, P50613, Q15369, P61218, P13984, Q9NYV4, Q9Y5B0, ENST00000278616, ENST00000350721, P51946, P51948, ENSG00000012048, Q8WX92, P62875, P52434, 2xO75909, P52435, Q08945, Q13888, Q13889, P53803, P55199, ENSG00000149554, P24928, ENSG00000140525, O15514, O60583, ENSG00000185379, P63272, Q6ZYL4, P19447, P32780, P19387, O60563, P36954, ENSG00000175054, P18074, ENSG00000144554, P19388, ENST00000376406, P50750, Q92759, ENST00000357654, P62487, Q8IXH7, ENST00000310775, P23193, Q8IYF1, ENSG00000149311, P35269, ENSG00000137337, ENST00000438015, O00267, P30876). Reactome uses a nested structure for complexes, which cannot be fully represented in SBML Level 3 Version 1 core
  species species_6797614 in nucleoplasm; species_6797614 is "CCNK:CDK12:Elongation Complex at DNA Repair Genes [nucleoplasm]";  // reactome:R-HSA-6797614; hasPart uniprot:Q15370 uniprot:Q14241 uniprot:Q9Y5B9 uniprot:Q9H3P2; isHomologTo reactome:R-MMU-6797614 reactome:R-RNO-6797614 reactome:R-CFA-6797614 reactome:R-BTA-6797614
  // Derived from a Reactome Complex. Here is Reactomes nested structure for this complex: (4xP04637, ENSG00000122512). Reactome uses a nested structure for complexes, which cannot be fully represented in SBML Level 3 Version 1 core
  species species_6806574 in nucleoplasm = 0; species_6806574 is "p-S15,S20-TP53 Tetramer:PMS2 Gene [nucleoplasm]";  // isDescribedBy pubmed:15781865; reactome:R-HSA-6806574; hasPart uniprot:P04637
  // Derived from a Reactome EntityWithAccessionedSequence. This is a protein
  species FANCC_Gene_nucleoplasm in nucleoplasm; FANCC_Gene_nucleoplasm is "FANCC Gene [nucleoplasm]";  // reactome:R-HSA-6806593
  // Derived from a Reactome EntityWithAccessionedSequence. This is a protein
  species PMS2_Gene_nucleoplasm in nucleoplasm; PMS2_Gene_nucleoplasm is "PMS2 Gene [nucleoplasm]";  // reactome:R-HSA-6806576
  // Derived from a Reactome DefinedSet. This is a list of alternative entities, any of which can perform the given function
  species AP_1_nucleoplasm in nucleoplasm; AP_1_nucleoplasm is "AP-1 [nucleoplasm]";  // reactome:R-HSA-6806560; hasPart uniprot:P05412 uniprot:P01100 uniprot:P15336
  // Derived from a Reactome EntityWithAccessionedSequence. This is a protein
  species MSH2_Gene_nucleoplasm in nucleoplasm; MSH2_Gene_nucleoplasm is "MSH2 Gene [nucleoplasm]";  // reactome:R-HSA-6806564
  // Derived from a Reactome Complex. Here is Reactomes nested structure for this complex: (2xP05412, P01100, ENSG00000095002, 4xP04637, P15336). Reactome uses a nested structure for complexes, which cannot be fully represented in SBML Level 3 Version 1 core
  species species_6806565 in nucleoplasm = 0; species_6806565 is "AP-1:p-S15,S20-TP53 Tetramer:MSH2 Gene [nucleoplasm]";  // isDescribedBy pubmed:10984493; reactome:R-HSA-6806565; hasPart uniprot:P05412 uniprot:P01100 uniprot:P04637 uniprot:P15336
  // Derived from a Reactome EntityWithAccessionedSequence. This is a protein
  species MLH1_Gene_nucleoplasm in nucleoplasm; MLH1_Gene_nucleoplasm is "MLH1 Gene [nucleoplasm]";  // reactome:R-HSA-6806585
  // Derived from a Reactome EntityWithAccessionedSequence. This is a protein
  species CCNK_nucleoplasm in nucleoplasm; CCNK_nucleoplasm is "CCNK [nucleoplasm]";  // uniprot:O75909 reactome:R-HSA-6796619; isHomologTo reactome:R-MMU-6796619 reactome:R-RNO-6796619 reactome:R-CFA-6796619 reactome:R-BTA-6796619
  // Derived from a Reactome EntityWithAccessionedSequence. This is a protein
  species CDK13_nucleoplasm in nucleoplasm; CDK13_nucleoplasm is "CDK13 [nucleoplasm]";  // uniprot:Q14004 reactome:R-HSA-6797014; isHomologTo reactome:R-MMU-6797014 reactome:R-RNO-6797014 reactome:R-CFA-6797014 reactome:R-BTA-6797014
  // Derived from a Reactome EntityWithAccessionedSequence. This is a protein
  species MSH2_nucleoplasm in nucleoplasm = 0; MSH2_nucleoplasm is "MSH2 [nucleoplasm]";  // uniprot:P43246 reactome:R-HSA-5357525; isHomologTo reactome:R-MMU-5357525 reactome:R-RNO-5357525 reactome:R-CFA-5357525 reactome:R-BTA-5357525
  // Derived from a Reactome EntityWithAccessionedSequence. This is a protein
  species CCNK_Gene_nucleoplasm in nucleoplasm; CCNK_Gene_nucleoplasm is "CCNK Gene [nucleoplasm]";  // reactome:R-HSA-6796652
  // Derived from a Reactome Complex. Here is Reactomes nested structure for this complex: (O75909, Q9NYV4). Reactome uses a nested structure for complexes, which cannot be fully represented in SBML Level 3 Version 1 core
  species CCNK_CDK12_nucleoplasm in nucleoplasm; CCNK_CDK12_nucleoplasm is "CCNK:CDK12 [nucleoplasm]";  // isDescribedBy pubmed:22012619; reactome:R-HSA-6797095; hasPart uniprot:O75909 uniprot:Q9NYV4; isHomologTo reactome:R-MMU-6797095 reactome:R-RNO-6797095 reactome:R-CFA-6797095 reactome:R-BTA-6797095
  // Derived from a Reactome CandidateSet. A list of entities, one or more of which might perform the given function
  species species_6797713 in nucleoplasm = 0; species_6797713 is "BRCA1, ATR, FANCD2, FANCI, ATM, MDC1, CHEK1, RAD51D [nucleoplasm]";  // reactome:R-HSA-6797713; hasPart uniprot:O75771 uniprot:Q9NVI1 uniprot:P38398 uniprot:Q13315
  // Derived from a Reactome SimpleEntity. This is a small compound
  species ADP_nucleoplasm in nucleoplasm = 0; ADP_nucleoplasm is "ADP [nucleoplasm]";  // CHEBI:456216 reactome:R-ALL-113582
  // Derived from a Reactome Complex. Here is Reactomes nested structure for this complex: (ENSG00000134574, 4xP04637). Reactome uses a nested structure for complexes, which cannot be fully represented in SBML Level 3 Version 1 core
  species species_6806601 in nucleoplasm = 0; species_6806601 is "p-S15,S20-TP53 Tetramer:DDB2 Gene [nucleoplasm]";  // isDescribedBy pubmed:11971958; reactome:R-HSA-6806601; hasPart uniprot:P04637
  // Derived from a Reactome Complex. Here is Reactomes nested structure for this complex: (ENST00000419585, Q15370, Q14241, Q9Y5B9, Q9H3P2, ENST00000345365, P18615, P50613, Q15369, P61218, P13984, Q9NYV4, Q9Y5B0, ENST00000278616, ENST00000350721, P51946, P51948, ENSG00000012048, Q8WX92, P62875, P52434, 2xO75909, P52435, Q08945, Q13888, Q13889, P53803, P55199, P24928, ENSG00000149554, O15514, ENSG00000140525, O60583, ENSG00000185379, P63272, Q6ZYL4, P19447, P32780, P19387, O60563, P36954, ENSG00000175054, P18074, P19388, ENSG00000144554, ENST00000376406, P50750, Q92759, ENST00000357654, P62487, Q8IXH7, ENST00000310775, P23193, Q8IYF1, ENSG00000149311, P35269, ENSG00000137337, ENST00000438015, O00267, P30876). Reactome uses a nested structure for complexes, which cannot be fully represented in SBML Level 3 Version 1 core
  species species_6797602 in nucleoplasm = 0; species_6797602 is "CCNK:CDK12:CDK12-Phosphorylated Elongation Complex at DNA repair genes [nucleoplasm]";  // reactome:R-HSA-6797602; hasPart uniprot:Q15370 uniprot:Q14241 uniprot:Q9Y5B9 uniprot:Q9H3P2; isHomologTo reactome:R-MMU-6797602 reactome:R-RNO-6797602 reactome:R-CFA-6797602 reactome:R-BTA-6797602
  // Derived from a Reactome EntityWithAccessionedSequence. This is a protein
  species CDK12_nucleoplasm in nucleoplasm; CDK12_nucleoplasm is "CDK12 [nucleoplasm]";  // uniprot:Q9NYV4 reactome:R-HSA-6797012; isHomologTo reactome:R-MMU-6797012 reactome:R-RNO-6797012 reactome:R-CFA-6797012 reactome:R-BTA-6797012
  // Derived from a Reactome Complex. Here is Reactomes nested structure for this complex: (ENST00000419585, Q15370, Q14241, Q9Y5B9, Q9H3P2, ENST00000345365, P18615, P50613, Q15369, P61218, P13984, Q9Y5B0, ENST00000278616, ENST00000350721, P51946, P51948, ENSG00000012048, Q8WX92, P62875, P52434, O75909, P52435, Q08945, Q13888, Q13889, P53803, P55199, ENSG00000149554, P24928, ENSG00000140525, O15514, O60583, ENSG00000185379, P63272, Q6ZYL4, P19447, P32780, P19387, O60563, P36954, ENSG00000175054, P18074, ENSG00000144554, P19388, ENST00000376406, P50750, Q92759, ENST00000357654, P62487, Q8IXH7, ENST00000310775, P23193, Q8IYF1, ENSG00000149311, P35269, ENSG00000137337, ENST00000438015, O00267, P30876). Reactome uses a nested structure for complexes, which cannot be fully represented in SBML Level 3 Version 1 core
  species species_6797611 in nucleoplasm; species_6797611 is "Elongation Complex at DNA Repair Genes [nucleoplasm]";  // reactome:R-HSA-6797611; hasPart uniprot:Q15370 uniprot:Q14241 uniprot:Q9Y5B9 uniprot:Q9H3P2; isHomologTo reactome:R-MMU-6797611 reactome:R-RNO-6797611 reactome:R-CFA-6797611 reactome:R-BTA-6797611
  // Derived from a Reactome EntityWithAccessionedSequence. This is a protein
  species MLH1_nucleoplasm in nucleoplasm = 0; MLH1_nucleoplasm is "MLH1 [nucleoplasm]";  // uniprot:P40692 reactome:R-HSA-912495; isHomologTo reactome:R-MMU-912495 reactome:R-RNO-912495 reactome:R-CFA-912495 reactome:R-BTA-912495
  // Derived from a Reactome EntityWithAccessionedSequence. This is a protein
  species DDB2_nucleoplasm in nucleoplasm = 0; DDB2_nucleoplasm is "DDB2 [nucleoplasm]";  // uniprot:Q92466 reactome:R-HSA-53491; isHomologTo reactome:R-MMU-53491 reactome:R-RNO-53491 reactome:R-CFA-53491 reactome:R-BTA-53491
  // Derived from a Reactome SimpleEntity. This is a small compound
  species ATP_nucleoplasm in nucleoplasm; ATP_nucleoplasm is "ATP [nucleoplasm]";  // CHEBI:30616 reactome:R-ALL-29358
  // Derived from a Reactome EntityWithAccessionedSequence. This is a protein
  species PMS2_nucleoplasm in nucleoplasm = 0; PMS2_nucleoplasm is "PMS2 [nucleoplasm]";  // uniprot:P54278 reactome:R-HSA-5357527; isHomologTo reactome:R-MMU-5357527 reactome:R-RNO-5357527 reactome:R-CFA-5357527 reactome:R-BTA-5357527
  // Derived from a Reactome Complex. Here is Reactomes nested structure for this complex: (O75909, Q14004). Reactome uses a nested structure for complexes, which cannot be fully represented in SBML Level 3 Version 1 core
  species CCNK_CDK13_nucleoplasm in nucleoplasm = 0; CCNK_CDK13_nucleoplasm is "CCNK:CDK13 [nucleoplasm]";  // isDescribedBy pubmed:22012619; reactome:R-HSA-6797094; hasPart uniprot:O75909 uniprot:Q14004; isHomologTo reactome:R-MMU-6797094 reactome:R-RNO-6797094 reactome:R-CFA-6797094 reactome:R-BTA-6797094
  // Derived from a Reactome CandidateSet. A list of entities, one or more of which might perform the given function
  species species_6797615 in nucleoplasm; species_6797615 is "DNA repair genes regulated by CDK12 [nucleoplasm]";  // reactome:R-HSA-6797615; isHomologTo reactome:R-MMU-6797615 reactome:R-RNO-6797615 reactome:R-CFA-6797615 reactome:R-BTA-6797615
  // Derived from a Reactome Complex. Here is Reactomes nested structure for this complex: (4xP04637, ENSG00000158169). Reactome uses a nested structure for complexes, which cannot be fully represented in SBML Level 3 Version 1 core
  species species_6806590 in nucleoplasm = 0; species_6806590 is "p-S15,S20-TP53 Tetramer:FANCC Gene [nucleoplasm]";  // isDescribedBy pubmed:9063748; reactome:R-HSA-6806590; hasPart uniprot:P04637
  // Derived from a Reactome Complex. Here is Reactomes nested structure for this complex: (4xP04637). Reactome uses a nested structure for complexes, which cannot be fully represented in SBML Level 3 Version 1 core
  species species_3222171 in nucleoplasm; species_3222171 is "p-S15,S20-TP53 Tetramer [nucleoplasm]";  // reactome:R-HSA-3222171; hasPart uniprot:P04637; isHomologTo reactome:R-MMU-3222171 reactome:R-RNO-3222171 reactome:R-CFA-3222171 reactome:R-BTA-3222171
  // Derived from a Reactome Complex. Here is Reactomes nested structure for this complex: (4xP04637, ENSG00000090061). Reactome uses a nested structure for complexes, which cannot be fully represented in SBML Level 3 Version 1 core
  species species_6796650 in nucleoplasm = 0; species_6796650 is "p-S15,S20-TP53 Tetramer:CCNK Gene [nucleoplasm]";  // isDescribedBy pubmed:11988847; reactome:R-HSA-6796650; hasPart uniprot:P04637
  species avg_species_6806606 in nucleoplasm = 0; avg_species_6806606 is "Average of species_6806606";
  species avg_species_6797614 in nucleoplasm = 0; avg_species_6797614 is "Average of species_6797614";
  species avg_species_6806593 in nucleoplasm = 0; avg_species_6806593 is "Average of species_6806593";
  species avg_species_6806576 in nucleoplasm = 0; avg_species_6806576 is "Average of species_6806576";
  species avg_species_6806560 in nucleoplasm = 0; avg_species_6806560 is "Average of species_6806560";
  species avg_species_6806564 in nucleoplasm = 0; avg_species_6806564 is "Average of species_6806564";
  species avg_species_6806585 in nucleoplasm = 0; avg_species_6806585 is "Average of species_6806585";
  species avg_species_6796619 in nucleoplasm = 0; avg_species_6796619 is "Average of species_6796619";
  species avg_species_6797014 in nucleoplasm = 0; avg_species_6797014 is "Average of species_6797014";
  species avg_species_6796652 in nucleoplasm = 0; avg_species_6796652 is "Average of species_6796652";
  species avg_species_6797095 in nucleoplasm = 0; avg_species_6797095 is "Average of species_6797095";
  species avg_species_6797012 in nucleoplasm = 0; avg_species_6797012 is "Average of species_6797012";
  species avg_species_6797611 in nucleoplasm = 0; avg_species_6797611 is "Average of species_6797611";
  species avg_species_29358 in nucleoplasm = 0; avg_species_29358 is "Average of species_29358";
  species avg_species_6797615 in nucleoplasm = 0; avg_species_6797615 is "Average of species_6797615";
  species avg_species_3222171 in nucleoplasm = 0; avg_species_3222171 is "Average of species_3222171";
  species avg_species_6796650 in nucleoplasm = 0; avg_species_6796650 is "Average of species_6796650";
  species avg_species_6806590 in nucleoplasm = 0; avg_species_6806590 is "Average of species_6806590";
  species avg_species_6797094 in nucleoplasm = 0; avg_species_6797094 is "Average of species_6797094";
  species avg_species_6806584 in nucleoplasm = 0; avg_species_6806584 is "Average of species_6806584";
  species avg_species_419530 in nucleoplasm = 0; avg_species_419530 is "Average of species_419530";
  species avg_species_6806574 in nucleoplasm = 0; avg_species_6806574 is "Average of species_6806574";
  species avg_species_912495 in nucleoplasm = 0; avg_species_912495 is "Average of species_912495";
  species avg_species_6806565 in nucleoplasm = 0; avg_species_6806565 is "Average of species_6806565";
  species avg_species_5357525 in nucleoplasm = 0; avg_species_5357525 is "Average of species_5357525";
  species avg_species_6806601 in nucleoplasm = 0; avg_species_6806601 is "Average of species_6806601";
  species avg_species_6797713 in nucleoplasm = 0; avg_species_6797713 is "Average of species_6797713";
  species avg_species_5357527 in nucleoplasm = 0; avg_species_5357527 is "Average of species_5357527";
  species avg_species_53491 in nucleoplasm = 0; avg_species_53491 is "Average of species_53491";
  species avg_species_113582 in nucleoplasm = 0; avg_species_113582 is "Average of species_113582";
  species avg_species_6797602 in nucleoplasm = 0; avg_species_6797602 is "Average of species_6797602";

  // Parameters:
  scale_parameter = 1;
  k_output_species_6796650 = 1;
  k_output_species_6806590 = 1;
  k_output_species_6797094 = 1;
  k_output_species_6806584 = 1;
  k_output_species_419530 = 1;
  k_output_species_6806574 = 1;
  k_output_species_912495 = 1;
  k_output_species_6806565 = 1;
  k_output_species_5357525 = 1;
  k_output_species_6806601 = 1;
  k_output_species_6797713 = 1;
  k_output_species_5357527 = 1;
  k_output_species_53491 = 1;
  k_output_species_113582 = 1;
  k_output_species_6797602 = 1;
  k_input_species_6797615 = 1e-7;
  k_input_species_3222171 = 1e-7;
  k_input_species_6797611 = 1e-7;
  k_input_species_6797012 = 1e-7;
  k_input_species_6796652 = 1e-7;
  k_input_species_29358 = 1e-7;
  k_input_species_6797014 = 1e-7;
  k_input_species_6806560 = 1e-7;
  k_input_species_6806585 = 1e-7;
  k_input_species_6806576 = 1e-7;
  k_input_species_6806593 = 1e-7;
  k_input_species_6806564 = 1e-7;
  k_input_species_6806606 = 1e-7;
  k_forcat_reaction_6806392 = 1;
  k_activator_modifierspeciesreference_6806392_positiveregulator_6806584 = 1;
  k_forcat_reaction_6797606 = 1;
  k_activator_modifierspeciesreference_6797606_catalyst_6797614 = 1;
  k_forcat_reaction_6806405 = 1;
  k_activator_modifierspeciesreference_6806405_positiveregulator_6806574 = 1;
  k_forcat_reaction_6806408 = 1;
  k_forcat_reaction_6806417 = 1;
  k_forcat_reaction_6806394 = 1;
  k_activator_modifierspeciesreference_6806394_positiveregulator_6806565 = 1;
  k_forcat_reaction_6796647 = 1;
  k_activator_modifierspeciesreference_6796647_positiveregulator_6796650 = 1;
  k_forcat_reaction_6806413 = 1;
  k_forcat_reaction_6797100 = 1;
  k_forcat_reaction_6806412 = 1;
  k_forcat_reaction_6796649 = 1;
  k_forcat_reaction_6797090 = 1;
  k_forcat_reaction_6797616 = 1;
  k_forcat_reaction_6806419 = 1;
  k_forcat_reaction_6797712 = 1;
  k_activator_modifierspeciesreference_6797712_positiveregulator_6797602 = 1;
  k_forcat_reaction_6806423 = 1;
  k_activator_modifierspeciesreference_6806423_positiveregulator_6806601 = 1;
  k_forcat_reaction_6806425 = 1;
  k_activator_modifierspeciesreference_6806425_positiveregulator_6806590 = 1;
  get_time = 0; get_time is "Auxiliary variable used in place of time due to naming restrictions";

  // Rate rules:
  get_time' = 1;
  avg_species_6806606' = (DDB2_Gene_nucleoplasm - avg_species_6806606)/(get_time + 1e-6);
  avg_species_6797614' = (species_6797614 - avg_species_6797614)/(get_time + 1e-6);
  avg_species_6806593' = (FANCC_Gene_nucleoplasm - avg_species_6806593)/(get_time + 1e-6);
  avg_species_6806576' = (PMS2_Gene_nucleoplasm - avg_species_6806576)/(get_time + 1e-6);
  avg_species_6806560' = (AP_1_nucleoplasm - avg_species_6806560)/(get_time + 1e-6);
  avg_species_6806564' = (MSH2_Gene_nucleoplasm - avg_species_6806564)/(get_time + 1e-6);
  avg_species_6806585' = (MLH1_Gene_nucleoplasm - avg_species_6806585)/(get_time + 1e-6);
  avg_species_6796619' = (CCNK_nucleoplasm - avg_species_6796619)/(get_time + 1e-6);
  avg_species_6797014' = (CDK13_nucleoplasm - avg_species_6797014)/(get_time + 1e-6);
  avg_species_6796652' = (CCNK_Gene_nucleoplasm - avg_species_6796652)/(get_time + 1e-6);
  avg_species_6797095' = (CCNK_CDK12_nucleoplasm - avg_species_6797095)/(get_time + 1e-6);
  avg_species_6797012' = (CDK12_nucleoplasm - avg_species_6797012)/(get_time + 1e-6);
  avg_species_6797611' = (species_6797611 - avg_species_6797611)/(get_time + 1e-6);
  avg_species_29358' = (ATP_nucleoplasm - avg_species_29358)/(get_time + 1e-6);
  avg_species_6797615' = (species_6797615 - avg_species_6797615)/(get_time + 1e-6);
  avg_species_3222171' = (species_3222171 - avg_species_3222171)/(get_time + 1e-6);
  avg_species_6796650' = (species_6796650 - avg_species_6796650)/(get_time + 1e-6);
  avg_species_6806590' = (species_6806590 - avg_species_6806590)/(get_time + 1e-6);
  avg_species_6797094' = (CCNK_CDK13_nucleoplasm - avg_species_6797094)/(get_time + 1e-6);
  avg_species_6806584' = (species_6806584 - avg_species_6806584)/(get_time + 1e-6);
  avg_species_419530' = (FANCC_nucleoplasm - avg_species_419530)/(get_time + 1e-6);
  avg_species_6806574' = (species_6806574 - avg_species_6806574)/(get_time + 1e-6);
  avg_species_912495' = (MLH1_nucleoplasm - avg_species_912495)/(get_time + 1e-6);
  avg_species_6806565' = (species_6806565 - avg_species_6806565)/(get_time + 1e-6);
  avg_species_5357525' = (MSH2_nucleoplasm - avg_species_5357525)/(get_time + 1e-6);
  avg_species_6806601' = (species_6806601 - avg_species_6806601)/(get_time + 1e-6);
  avg_species_6797713' = (species_6797713 - avg_species_6797713)/(get_time + 1e-6);
  avg_species_5357527' = (PMS2_nucleoplasm - avg_species_5357527)/(get_time + 1e-6);
  avg_species_53491' = (DDB2_nucleoplasm - avg_species_53491)/(get_time + 1e-6);
  avg_species_113582' = (ADP_nucleoplasm - avg_species_113582)/(get_time + 1e-6);
  avg_species_6797602' = (species_6797602 - avg_species_6797602)/(get_time + 1e-6);

  // Reactions:
  // TP53 (p53) stimulates transcription of the MLH1 gene, involved in DNA mismatch repair, by binding to the p53 response element in the first intron of the MLH1 gene (Chen and Sadowski 2005).
  TP53_stimulates_MLH1_expression: MLH1_Gene_nucleoplasm => MLH1_nucleoplasm; species_6806584^10/(k_activator_modifierspeciesreference_6806392_positiveregulator_6806584^10 + species_6806584^10)*k_forcat_reaction_6806392*MLH1_Gene_nucleoplasm;  // modifiers: species_6806584; reactome:R-HSA-6806392; isDescribedBy pubmed:15781865; reactome:R-HSA-6806392
  // CDK12, in complex with CCNK (cyclin K), phosphorylates heptapeptide repeats in the C-terminal domain (CTD) of the RNA polymerase II (RNA Pol II) subunit POLR2A. CDK12 may require phosphorylation of its threonine residue T893 to achieve full catalytic activity, but the activating kinase is not known. CDK12-mediated phosphorylation of the CTD of POLR2A occurs after the heptapeptide repeats in the CTD of POLR2A undergo phosphorylation by the CDK9-containing P-TEFb complex. It is unclear whether CDK12 acts on the second serine or the fifth serine or both in the YSPTSPS repeats. The mammalian POLR2A contains 52 heptapeptide repeats that start at amino acid position 1615. The exact localization of CDK9 and CDK12 target sites relative to the full-length POLR2A is not known. CDK12-mediated phosphorylation of the pre-phosphorylated RNA Pol II complex is important for the transcription of a group of genes with long and complex structures, involved in DNA repair (Blazek et al. 2011, Cheng et al. 2012, Bosken et al. 2014, Bartkowiak and Greenleaf 2015, Liang et al. 2015).
  reaction_6797606: ATP_nucleoplasm + species_6797614 => species_6797602 + ADP_nucleoplasm; species_6797614^10/(k_activator_modifierspeciesreference_6797606_catalyst_6797614^10 + species_6797614^10)*k_forcat_reaction_6797606*ATP_nucleoplasm*species_6797614; reaction_6797606 is "CDK12 phosphorylates RNA Pol II CTD at DNA repair genes";  // reactome:R-HSA-6797606; isDescribedBy pubmed:22012619 pubmed:25561469 pubmed:25429106 pubmed:22988298; reactome:R-HSA-6797606; GO:0004693
  // TP53 (p53) stimulates transcription of PMS2, involved in DNA mismatch repair, by binding to the p53 response element in the first intron of the PMS2 gene (Chen and Sadowski 2005).
  TP53_stimulates_PMS2_expression: PMS2_Gene_nucleoplasm => PMS2_nucleoplasm; species_6806574^10/(k_activator_modifierspeciesreference_6806405_positiveregulator_6806574^10 + species_6806574^10)*k_forcat_reaction_6806405*PMS2_Gene_nucleoplasm;  // modifiers: species_6806574; reactome:R-HSA-6806405; isDescribedBy pubmed:15781865; reactome:R-HSA-6806405
  // TP53 (p53) binds the p53 response element in the first intron of the PMS2 gene (Chen and Sadowski 2005).
  TP53_binds_the_PMS2_gene: species_3222171 + PMS2_Gene_nucleoplasm => species_6806574; k_forcat_reaction_6806408*species_3222171*PMS2_Gene_nucleoplasm;  // reactome:R-HSA-6806408; isDescribedBy pubmed:15781865; reactome:R-HSA-6806408
  // TP53 (p53) binds the p53 response element in the 5'UTR-encoding region of the DDB2 gene. The p53 response element is present in the human DDB2 gene, but absent from the mouse Ddb2 gene (Tan and Chu 2002).
  TP53_binds_the_DDB2_gene: DDB2_Gene_nucleoplasm + species_3222171 => species_6806601; k_forcat_reaction_6806417*DDB2_Gene_nucleoplasm*species_3222171;  // reactome:R-HSA-6806417; isDescribedBy pubmed:11971958; reactome:R-HSA-6806417
  // TP53 and the AP-1 transcription factor complex cooperatively stimulate transcription of the MSH2 gene, involved in DNA mismatch repair, by binding to adjacent sites in the MSH2 promoter (Scherer et al. 2001). TP53 may stimulate transcription of MSH2 independently of the AP-1 complex when bound to a different p53 response element in the MSH2 promoter (Warnick et al. 2001).
  reaction_6806394: MSH2_Gene_nucleoplasm => MSH2_nucleoplasm; species_6806565^10/(k_activator_modifierspeciesreference_6806394_positiveregulator_6806565^10 + species_6806565^10)*k_forcat_reaction_6806394*MSH2_Gene_nucleoplasm; reaction_6806394 is "TP53 and AP-1 stimulate MSH2 expression";  // modifiers: species_6806565; reactome:R-HSA-6806394; isDescribedBy pubmed:10984493 pubmed:11350971; reactome:R-HSA-6806394
  // TP53 (p53) binding to the p53 response element in the first intron of the CCNK (cyclin K) gene stimulates CCNK transcription (Mori et al. 2002).
  TP53_stimulates_CCNK_expression: CCNK_Gene_nucleoplasm => CCNK_nucleoplasm; species_6796650^10/(k_activator_modifierspeciesreference_6796647_positiveregulator_6796650^10 + species_6796650^10)*k_forcat_reaction_6796647*CCNK_Gene_nucleoplasm;  // modifiers: species_6796650; reactome:R-HSA-6796647; isDescribedBy pubmed:11988847; reactome:R-HSA-6796647
  // TP53 (p53) binds the p53 response element in the first intron of the MLH1 gene (Chen and Sadowski 2005).
  TP53_binds_the_MLH1_gene: MLH1_Gene_nucleoplasm + species_3222171 => species_6806584; k_forcat_reaction_6806413*MLH1_Gene_nucleoplasm*species_3222171;  // reactome:R-HSA-6806413; isDescribedBy pubmed:15781865; reactome:R-HSA-6806413
  // Cyclin K (CCNK) forms a complex with CDK13 (Blazek et al. 2011).
  CCNK_binds_CDK13: CDK13_nucleoplasm + CCNK_nucleoplasm => CCNK_CDK13_nucleoplasm; k_forcat_reaction_6797100*CDK13_nucleoplasm*CCNK_nucleoplasm;  // reactome:R-HSA-6797100; isDescribedBy pubmed:22012619; reactome:R-HSA-6797100
  // TP53 (p53) binds to the p53 response element in the promoter of the MSH2 gene. The p53 response element is flanked by two AP-1 sites. The AP-1 transcription factor complex binds the MSH2 promoter cooperatively with TP53 (Scherer et al. 2000). An additional p53 response element in closer proximity to the MSH2 transcription start site has been reported that does not involve a nearby AP-1 binding site (Warnick et al. 2001).
  reaction_6806412: MSH2_Gene_nucleoplasm + AP_1_nucleoplasm + species_3222171 => species_6806565; k_forcat_reaction_6806412*MSH2_Gene_nucleoplasm*AP_1_nucleoplasm*species_3222171; reaction_6806412 is "TP53 and AP-1 bind the MSH2 promoter";  // reactome:R-HSA-6806412; isDescribedBy pubmed:10984493 pubmed:11350971; reactome:R-HSA-6806412
  // TP53 (p53) binds p53 response element located in the first intron of the CCNK (cyclin K) gene (Mori et al. 2002).
  TP53_binds_the_CCNK_gene: CCNK_Gene_nucleoplasm + species_3222171 => species_6796650; k_forcat_reaction_6796649*CCNK_Gene_nucleoplasm*species_3222171;  // reactome:R-HSA-6796649; isDescribedBy pubmed:11988847; reactome:R-HSA-6796649
  // Cyclin K (CCNK) forms a complex with CDK12 (Blazek et al. 2011).
  CCNK_binds_CDK12: CDK12_nucleoplasm + CCNK_nucleoplasm => CCNK_CDK12_nucleoplasm; k_forcat_reaction_6797090*CDK12_nucleoplasm*CCNK_nucleoplasm;  // reactome:R-HSA-6797090; isDescribedBy pubmed:22012619; reactome:R-HSA-6797090
  // The complex of CDK12 and CCNK (cyclin K) associates with the RNA polymerase II (RNA Pol II) elongation complex at DNA repair genes encoding long primary transcripts, such as BRCA1, ATR, FANCI, FANCD2, ATM, MDC1, CHEK1, RAD51D and APEX1 (Blazek et al. 2011, Bartkowiak and Greenleaf 2015, Ekumi et al. 2015, Liang et al. 2015).
  reaction_6797616: species_6797611 + CCNK_CDK12_nucleoplasm => species_6797614; k_forcat_reaction_6797616*species_6797611*CCNK_CDK12_nucleoplasm; reaction_6797616 is "CCNK:CDK12 binds RNA Pol II at DNA repair genes";  // reactome:R-HSA-6797616; isDescribedBy pubmed:22012619 pubmed:25712099 pubmed:25429106 pubmed:25561469; reactome:R-HSA-6797616
  // TP53 (p53) binds the p53 response element in the promoter of the FANCC (Fanconi anemia group C) gene (Liebetrau et al. 1997).
  TP53_binds_the_FANCC_gene: FANCC_Gene_nucleoplasm + species_3222171 => species_6806590; k_forcat_reaction_6806419*FANCC_Gene_nucleoplasm*species_3222171;  // reactome:R-HSA-6806419; isDescribedBy pubmed:9063748; reactome:R-HSA-6806419
  // CDK12-mediated phosphorylation of the C-terminal domain (CTD) of the RNA polymerase II (RNA Pol II) subunit POLR2A (Rpb1) positively regulates transcription and, hence, expression of a set of DNA repair genes that encode long primary transcripts. CDK12, in complex with the TP53-regulated CCNK (cyclin K), phosphorylates POLR2A that was pre-phosphorylated by the CDK9-containing complex P-TEFb. CDK12-mediated phosphorylation of POLR2A is thought to increase the processivity of the RNA Pol II, enabling efficient transcription of long DNA repair genes (Blazek et al. 2011, Cheng et al. 2012, Bosken et al. 2014, Bartkowiak and Greenleaf 2015). CDK12 was shown to colocalize with the RNA Pol II complex at FANCD2, FANCI, ATM, CHEK1, MDC1, RAD51D and ATR gene loci (Ekumi et al. 2015) and to be necessary for achieving sufficient BRCA1 expression (Blazek et al. 2011). CDK12 positively regulates the expression of APEX1, involved in base excision repair (Liang et al. 2015). Recurrent CDK12 mutations are found in ovarian cancer. These mutations affect either the catalytic cleft of CDK12 or disable the interaction of CDK12 with CCNK, resulting in the loss of CDK12 function. Ovarian tumors that harbour inactivating CDK12 mutations exhibit decreased BRCA1 levels, defective homologous recombination repair, increased sensitivity to DNA crosslinking agents, and sensitivity to PARP inhibitors (Joshi et al. 2014, Ekumi et al. 2015).
  reaction_6797712: species_6797615 => species_6797713; species_6797602^10/(k_activator_modifierspeciesreference_6797712_positiveregulator_6797602^10 + species_6797602^10)*k_forcat_reaction_6797712*species_6797615; reaction_6797712 is "CDK12 stimulates expression of DNA repair genes";  // modifiers: species_6797602; reactome:R-HSA-6797712; isDescribedBy pubmed:25561469 pubmed:25429106 pubmed:25712099 pubmed:22012619; reactome:R-HSA-6797712
  // TP53 (p53) stimulates transcription of the DDB2 gene, involved in nucleotide excision repair, by binding to the p53 response element in the 5'UTR-encoding region of the DDB2 gene (Tan and Chu 2002).
  TP53_stimulates_DDB2_expression: DDB2_Gene_nucleoplasm => DDB2_nucleoplasm; species_6806601^10/(k_activator_modifierspeciesreference_6806423_positiveregulator_6806601^10 + species_6806601^10)*k_forcat_reaction_6806423*DDB2_Gene_nucleoplasm;  // modifiers: species_6806601; reactome:R-HSA-6806423; isDescribedBy pubmed:11971958; reactome:R-HSA-6806423
  // TP53 (p53) stimulates transcription of the FANCC (Fanconi anemia group C) gene, involved in the Fanconi anemia pathway that repairs DNA interstrand crosslinks, by binding to the p53 response element in the FANCC promoter (Liebetrau et al. 1997).
  TP53_stimulates_FANCC_expression: FANCC_Gene_nucleoplasm => FANCC_nucleoplasm; species_6806590^10/(k_activator_modifierspeciesreference_6806425_positiveregulator_6806590^10 + species_6806590^10)*k_forcat_reaction_6806425*FANCC_Gene_nucleoplasm;  // modifiers: species_6806590; reactome:R-HSA-6806425; isDescribedBy pubmed:9063748; reactome:R-HSA-6806425
  degredete_output_species_6796650: species_6796650 => ; scale_parameter*k_output_species_6796650*species_6796650; degredete_output_species_6796650 is "Degredate the output species of the pathway: species_6796650";
  degredete_output_species_6806590: species_6806590 => ; scale_parameter*k_output_species_6806590*species_6806590; degredete_output_species_6806590 is "Degredate the output species of the pathway: species_6806590";
  degredete_output_species_6797094: CCNK_CDK13_nucleoplasm => ; scale_parameter*k_output_species_6797094*CCNK_CDK13_nucleoplasm; degredete_output_species_6797094 is "Degredate the output species of the pathway: species_6797094";
  degredete_output_species_6806584: species_6806584 => ; scale_parameter*k_output_species_6806584*species_6806584; degredete_output_species_6806584 is "Degredate the output species of the pathway: species_6806584";
  degredete_output_species_419530: FANCC_nucleoplasm => ; scale_parameter*k_output_species_419530*FANCC_nucleoplasm; degredete_output_species_419530 is "Degredate the output species of the pathway: species_419530";
  degredete_output_species_6806574: species_6806574 => ; scale_parameter*k_output_species_6806574*species_6806574; degredete_output_species_6806574 is "Degredate the output species of the pathway: species_6806574";
  degredete_output_species_912495: MLH1_nucleoplasm => ; scale_parameter*k_output_species_912495*MLH1_nucleoplasm; degredete_output_species_912495 is "Degredate the output species of the pathway: species_912495";
  degredete_output_species_6806565: species_6806565 => ; scale_parameter*k_output_species_6806565*species_6806565; degredete_output_species_6806565 is "Degredate the output species of the pathway: species_6806565";
  degredete_output_species_5357525: MSH2_nucleoplasm => ; scale_parameter*k_output_species_5357525*MSH2_nucleoplasm; degredete_output_species_5357525 is "Degredate the output species of the pathway: species_5357525";
  degredete_output_species_6806601: species_6806601 => ; scale_parameter*k_output_species_6806601*species_6806601; degredete_output_species_6806601 is "Degredate the output species of the pathway: species_6806601";
  degredete_output_species_6797713: species_6797713 => ; scale_parameter*k_output_species_6797713*species_6797713; degredete_output_species_6797713 is "Degredate the output species of the pathway: species_6797713";
  degredete_output_species_5357527: PMS2_nucleoplasm => ; scale_parameter*k_output_species_5357527*PMS2_nucleoplasm; degredete_output_species_5357527 is "Degredate the output species of the pathway: species_5357527";
  degredete_output_species_53491: DDB2_nucleoplasm => ; scale_parameter*k_output_species_53491*DDB2_nucleoplasm; degredete_output_species_53491 is "Degredate the output species of the pathway: species_53491";
  degredete_output_species_113582: ADP_nucleoplasm => ; scale_parameter*k_output_species_113582*ADP_nucleoplasm; degredete_output_species_113582 is "Degredate the output species of the pathway: species_113582";
  degredete_output_species_6797602: species_6797602 => ; scale_parameter*k_output_species_6797602*species_6797602; degredete_output_species_6797602 is "Degredate the output species of the pathway: species_6797602";
  generate_input_species_6797615: => species_6797615; scale_parameter*k_input_species_6797615; generate_input_species_6797615 is "Create input species of the pathway: species_6797615";
  generate_input_species_3222171: => species_3222171; scale_parameter*k_input_species_3222171; generate_input_species_3222171 is "Create input species of the pathway: species_3222171";
  generate_input_species_6797611: => species_6797611; scale_parameter*k_input_species_6797611; generate_input_species_6797611 is "Create input species of the pathway: species_6797611";
  generate_input_species_6797012: => CDK12_nucleoplasm; scale_parameter*k_input_species_6797012; generate_input_species_6797012 is "Create input species of the pathway: species_6797012";
  generate_input_species_6796652: => CCNK_Gene_nucleoplasm; scale_parameter*k_input_species_6796652; generate_input_species_6796652 is "Create input species of the pathway: species_6796652";
  generate_input_species_29358: => ATP_nucleoplasm; scale_parameter*k_input_species_29358; generate_input_species_29358 is "Create input species of the pathway: species_29358";
  generate_input_species_6797014: => CDK13_nucleoplasm; scale_parameter*k_input_species_6797014; generate_input_species_6797014 is "Create input species of the pathway: species_6797014";
  generate_input_species_6806560: => AP_1_nucleoplasm; scale_parameter*k_input_species_6806560; generate_input_species_6806560 is "Create input species of the pathway: species_6806560";
  generate_input_species_6806585: => MLH1_Gene_nucleoplasm; scale_parameter*k_input_species_6806585; generate_input_species_6806585 is "Create input species of the pathway: species_6806585";
  generate_input_species_6806576: => PMS2_Gene_nucleoplasm; scale_parameter*k_input_species_6806576; generate_input_species_6806576 is "Create input species of the pathway: species_6806576";
  generate_input_species_6806593: => FANCC_Gene_nucleoplasm; scale_parameter*k_input_species_6806593; generate_input_species_6806593 is "Create input species of the pathway: species_6806593";
  generate_input_species_6806564: => MSH2_Gene_nucleoplasm; scale_parameter*k_input_species_6806564; generate_input_species_6806564 is "Create input species of the pathway: species_6806564";
  generate_input_species_6806606: => DDB2_Gene_nucleoplasm; scale_parameter*k_input_species_6806606; generate_input_species_6806606 is "Create input species of the pathway: species_6806606";
end
