// SBML level 3 version 1
// SBML generated from Reactome version 93 on 7/1/25, 2:41 AM using JSBML version 1.5.

model pathway_9938206()
  // Developmental Lineage of Mammary Stem Cells
  // During embryonic development in mammals, mammary stem cells (MaSCs) are derived from embryonic non-neural surface ectoderm (Nakanoh et al. 2024, reviewed in Donovan and Cascella 2022). Embryonic ectodermal cells first produce epithelial cells of the mammary ridge in humans, which likely correspond to epithelial cells of the mammary placode in mice. However, as intermediary cell states during human mammary gland development have not been immunohistochemically characterized, and as direct extrapolation from findings in mouse may not be justified (reviewed in Gusterson and Stein 2012), only non-neural surface ectoderm cells and MaSCs have been included in this lineage and the intermediary states will be included as the data becomes available.MaSCs have been studied in detail in mouse development, and have been much less characterized in humans. In the mouse, MaSCs are defined as those cells that are able to generate a functional mammary gland when transplanted in vivo (Shackleton et al. 2006; Stingl et al. 2006), but there is evidence that expression of certain markers in mouse MaSCs changes during different stages of mammary gland morphogenesis e.g. during pregnancy (Desgrosellier et al. 2014). Most data available on human MaSCs is derived from adult stem-like cells in human mammary glands that are able to differentiate in vitro into both myoepithelial and ductal (luminal) epithelial cells and thus are also known as mammary bipotent progenitors (MBiPs). It is uncertain how much these adult human MaSCs/MBiPs differ from embryonic and fetal MaSCs. Multiple reports agree on MaSCs residing within the basal epithelial cell subpopulation in both humans and mice, but the definitive list of markers that can be used to isolate pure MaSCs from within the basal epithelial subset has not been defined (reviewed in Phillips and Kuperwasser 2014).Mouse MaSCs are first apparent in mammary placodes. Lef1 (Lymphoid Enhancer Binding Factor 1) is a transcription factor that binds to beta-catenin (Ctnnb1) after activation by Wnt/β-catenin signaling. The Lef1:Ctnnb1 complex plays a critical role in controlling the transcription of genes involved in mouse mammary placode formation by driving epithelial cell proliferation and differentiation during the early stages of mammary gland development (reviewed in Lindvall et al. 2007). WNT ligand Wnt10b plays an important role in the embryonic stages of mouse mammary gland development, including placode and bud formation (reviewed in Watson and Khaled 2020, Slepicka et al. 2021). Besides Wnt10b, Wnt6 and Wnt10a are also implicated in mouse mammary bud formation (reviewed in McNally and Stein 2017). Wnt4 plays a role in mouse mammary gland development during puberty and pregnancy (reviewed in Slepicka et al. 2021). Wnt4 expression is regulated by progesterone, as it is expressed in progesterone receptor-positive cells (reviewed in Tanos et al. 2012), and it acts as a paracrine mediator of progesterone signaling in the mammary gland (reviewed in McNally and Stein 2017). FGF signaling also plays a role in mammary placode formation, in particular Fgf10-mediated activation of Fgfr2b (reviewed in Mailleux et al. 2002, McNally and Stein 2017), but the FGF receptor Fgfr1 and ligands Fgf4, Fgf8, Fgf7, and Fgf17 are also expressed in the developing placode (reviewed in McNally and Stein 2017). Other signaling pathways studied in mouse that contribute to development of mammary glands and maintenance and differentiation of MaSC include Hedgehog signaling (reviewed in Lewis and Veltmaat 2004), NOTCH signaling (Bouras et al. 2008, reviewed in Edwards and Brennan 2021), and estrogen and progesterone signaling (Feng et al. 2007, reviewed in Tanos et al. 2012). The involvement of FGF10 in generation and maintenance of MaSCs appears to be conserved in humans (Qu et al. 2017, Ortiz et al. 2024).In normal adult human breast epithelium, mammary stem cells are rare and are located in the ductal part of terminal ductal lobular units (Villadsen et al. 2007; Ginestier et al. 2007).Recent studies indicate that the MaSC/MBiP cell population is heterogeneous, and it is likely that both early and late MaSCs exist with not completely overlapping sets of markers (Scheele et al. 2017, reviewed in Visvader and Stingl 2014 and Slepicka et al. 2021).
  // reactome:R-HSA-9938206
  // isDescribedBy pubmed:22426022 pubmed:38289401 pubmed:18940734 pubmed:25117682 pubmed:33085328 pubmed:34295896

  // Compartments:
  compartment extracellular_region;  // GO:0005576

  // Species:
  // Derived from a Reactome EntityWithAccessionedSequence. This is a protein
  species FGF10_extracellular_region in extracellular_region; FGF10_extracellular_region is "FGF10 [extracellular region]";  // uniprot:O15520 reactome:R-HSA-189869; isHomologTo reactome:R-MMU-189869 reactome:R-RNO-189869 reactome:R-CFA-189869 reactome:R-BTA-189869
  // Derived from a Reactome Cell. Not available
  species mammary_stem_cell in extracellular_region = 0;  // reactome:R-HSA-9925889
  // Derived from a Reactome Cell. Not available
  species species_9925883 in extracellular_region; species_9925883 is "embryonic non-neural surface ectoderm cell";  // reactome:R-HSA-9925883
  species avg_species_189869 in extracellular_region = 0; avg_species_189869 is "Average of species_189869";
  species avg_species_9925883 in extracellular_region = 0; avg_species_9925883 is "Average of species_9925883";
  species avg_species_9925889 in extracellular_region = 0; avg_species_9925889 is "Average of species_9925889";

  // Parameters:
  scale_parameter = 1;
  k_output_species_9925889 = 1;
  k_input_species_9925883 = 1e-7;
  k_input_species_189869 = 1e-7;
  k_output_species_189869 = 1e-7;
  k_forcat_reaction_9925817 = 1;
  k_activator_modifierspeciesreference_9925817_positiveregulator_189869 = 1;
  get_time = 0; get_time is "Auxiliary variable used in place of time due to naming restrictions";

  // Rate rules:
  get_time' = 1;
  avg_species_189869' = (FGF10_extracellular_region - avg_species_189869)/(get_time + 1e-6);
  avg_species_9925883' = (species_9925883 - avg_species_9925883)/(get_time + 1e-6);
  avg_species_9925889' = (mammary_stem_cell - avg_species_9925889)/(get_time + 1e-6);

  // Reactions:
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  reaction_9925817: species_9925883 => mammary_stem_cell; FGF10_extracellular_region^10/(k_activator_modifierspeciesreference_9925817_positiveregulator_189869^10 + FGF10_extracellular_region^10)*k_forcat_reaction_9925817*species_9925883; reaction_9925817 is "Embryonic ectoderm cell produces mammary stem cell";  // modifiers: FGF10_extracellular_region; reactome:R-HSA-9925817; isDescribedBy pubmed:11519870 pubmed:24162158 pubmed:24124521 pubmed:28132888; reactome:R-HSA-9925817; isDescribedBy pubmed:11599044 pubmed:38427729 pubmed:32457901 pubmed:34638263
  degredete_output_species_9925889: mammary_stem_cell => ; scale_parameter*k_output_species_9925889*mammary_stem_cell; degredete_output_species_9925889 is "Degredate the output species of the pathway: species_9925889";
  degredete_output_species_189869: FGF10_extracellular_region => ; scale_parameter*k_output_species_189869*FGF10_extracellular_region; degredete_output_species_189869 is "Degredate the output species of the pathway: species_189869";
  generate_input_species_9925883: => species_9925883; scale_parameter*k_input_species_9925883; generate_input_species_9925883 is "Create input species of the pathway: species_9925883";
  generate_input_species_189869: => FGF10_extracellular_region; scale_parameter*k_input_species_189869; generate_input_species_189869 is "Create input species of the pathway: species_189869";
end
