// SBML level 3 version 1
// SBML generated from Reactome version 93 on 6/25/25, 3:47 PM using JSBML version 1.5.

model pathway_390471()
  // Association of TriC/CCT with target proteins during biosynthesis
  // TRiC has broad recognition specificities, but in the cell it interacts with only a defined set of substrates (Yam et al. 2008). Many of its substrates that are targeted during biosynthesis are conserved between mammals and yeast (Yam et al. 2008).
  // reactome:R-HSA-390471
  // isDescribedBy pubmed:19011634

  // Compartments:
  compartment cytosol = 1.408e-12;  // GO:0005829

  // Species:
  // Derived from a Reactome Complex. Here is Reactomes nested structure for this complex: (Q92526, Q99832, 8x456216, P49368, P48643, P50991, P17987, P78371, P40227, P50990). Reactome uses a nested structure for complexes, which cannot be fully represented in SBML Level 3 Version 1 core
  species CCT_TRiC_ADP_cytosol in cytosol; CCT_TRiC_ADP_cytosol is "CCT/TRiC:ADP [cytosol]";  // isDescribedBy pubmed:15519848 pubmed:21572988 pubmed:9013858; reactome:R-HSA-390455; hasPart uniprot:Q92526 uniprot:Q99832 CHEBI:456216 uniprot:P49368; isHomologTo reactome:R-MMU-390455 reactome:R-RNO-390455 reactome:R-CFA-390455 reactome:R-BTA-390455
  // Derived from a Reactome EntityWithAccessionedSequence. This is a protein
  species SPHK1_cytosol in cytosol; SPHK1_cytosol is "SPHK1 [cytosol]";  // uniprot:Q9NYA1 reactome:R-HSA-391267; isHomologTo reactome:R-MMU-391267 reactome:R-RNO-391267 reactome:R-CFA-391267 reactome:R-BTA-391267
  // Derived from a Reactome Complex. Here is Reactomes nested structure for this complex: (Q92526, Q99832, 8x456216, P49368, Q9NYA1, P48643, P50991, P17987, P78371, P40227, P50990). Reactome uses a nested structure for complexes, which cannot be fully represented in SBML Level 3 Version 1 core
  species species_391256 in cytosol = 0; species_391256 is "CCT/TRiC:ADP:Sphingosine kinase 1 [cytosol]";  // reactome:R-HSA-391256; hasPart uniprot:Q92526 uniprot:Q99832 CHEBI:456216 uniprot:P49368; isHomologTo reactome:R-MMU-391256 reactome:R-RNO-391256 reactome:R-CFA-391256 reactome:R-BTA-391256
  // Derived from a Reactome CandidateSet. A list of entities, one or more of which might perform the given function
  species species_391287 in cytosol; species_391287 is "unfolded CCT/TRiC substrate candidates [cytosol]";  // isDescribedBy pubmed:19011634 pubmed:12502735 pubmed:21098288 pubmed:21995946; reactome:R-HSA-391287; hasPart uniprot:Q9BVG8 uniprot:Q9NRD1 uniprot:O96020 uniprot:Q5XUX1
  // Derived from a Reactome Complex. Here is Reactomes nested structure for this complex: (Q9BVG8, Q9NRD1, O96020, Q5XUX1, P78371, Q969U6, P04637, P57775, P61962, P40763, Q86WA8, 8x456216, P48643, Q969H0, P40227, Q9Y2T2, Q9BUR4, Q9Y6D5, O95302, O14556, Q5XX13, P17987, Q9UKT8, P04062, Q15477, P24864, Q92526, Q99832, O15379, Q9H0D6, P49368, O00567, Q9UKT7, Q9UKT5, P50991, Q9H1H9, P50990, P51784, Q9UKA1). Reactome uses a nested structure for complexes, which cannot be fully represented in SBML Level 3 Version 1 core
  species species_390481 in cytosol = 0; species_390481 is "CCT/TRiC:substrate complex [cytosol]";  // isDescribedBy pubmed:19011634; reactome:R-HSA-390481; hasPart uniprot:Q9BVG8 uniprot:Q9NRD1 uniprot:O96020 uniprot:Q5XUX1
  species avg_species_390455 in cytosol = 0; avg_species_390455 is "Average of species_390455";
  species avg_species_391267 in cytosol = 0; avg_species_391267 is "Average of species_391267";
  species avg_species_391287 in cytosol = 0; avg_species_391287 is "Average of species_391287";
  species avg_species_390481 in cytosol = 0; avg_species_390481 is "Average of species_390481";
  species avg_species_391256 in cytosol = 0; avg_species_391256 is "Average of species_391256";

  // Parameters:
  scale_parameter = 1e16;
  k_output_species_390481 = 1;
  k_output_species_391256 = 1;
  k_input_species_391287 = 1e-7;
  k_input_species_391267 = 1e-7;
  k_input_species_390455 = 1e-7;
  k_forcat_reaction_391266 = 1;
  k_forcat_reaction_390470 = 1;
  get_time = 0; get_time is "Auxiliary variable used in place of time due to naming restrictions";

  // Rate rules:
  get_time' = 1;
  avg_species_390455' = (CCT_TRiC_ADP_cytosol - avg_species_390455)/(get_time + 1e-6);
  avg_species_391267' = (SPHK1_cytosol - avg_species_391267)/(get_time + 1e-6);
  avg_species_391287' = (species_391287 - avg_species_391287)/(get_time + 1e-6);
  avg_species_390481' = (species_390481 - avg_species_390481)/(get_time + 1e-6);
  avg_species_391256' = (species_391256 - avg_species_391256)/(get_time + 1e-6);

  // Reactions:
  // CCT/TRiC facilitates folding of newly translated SK1 into its mature active form (Zebol et al., 2008)
  reaction_391266: CCT_TRiC_ADP_cytosol + SPHK1_cytosol => species_391256; k_forcat_reaction_391266*CCT_TRiC_ADP_cytosol*SPHK1_cytosol; reaction_391266 is "Association of CCT/TriC with sphingosine kinase 1";  // reactome:R-HSA-391266; isDescribedBy pubmed:18775504; reactome:R-HSA-391266
  // A combination of proteomic and bioinformatics analyses of TRiC substrates has revealed that they have complex topologies that are slow folding and aggregation prone (Yam et al., 2008). These substrates are also enriched in proteins that belong to oligomeric assemblies suggesting that TRiC plays a role in promoting complex assembly (Yam et al., 2008). Two possible mechanisms describing the role of TriC have been suggested (Yam et al., 2008). The processes of TRiC-mediated folding and assembly could be directly coupled, or TRiC could fold monomeric subunits and hold them in an assembly-competent state until they associate with the appropriate partner subunits. The complete list of TriC subsrates is not yet known. Many of its substrates that are targeted during biosynthesis are conserved between mammals and yeast (Yam et al. 2008).
  reaction_390470: CCT_TRiC_ADP_cytosol + species_391287 => species_390481; k_forcat_reaction_390470*CCT_TRiC_ADP_cytosol*species_391287; reaction_390470 is "Association of CCT/TriC with other substrates during biosynthesis (unknown chaperone)";  // reactome:R-HSA-390470; isDescribedBy pubmed:19011634 pubmed:12502735 pubmed:21098288 pubmed:21995946; reactome:R-HSA-390470
  degredete_output_species_390481: species_390481 => ; scale_parameter*k_output_species_390481*species_390481; degredete_output_species_390481 is "Degredate the output species of the pathway: species_390481";
  degredete_output_species_391256: species_391256 => ; scale_parameter*k_output_species_391256*species_391256; degredete_output_species_391256 is "Degredate the output species of the pathway: species_391256";
  generate_input_species_391287: => species_391287; scale_parameter*k_input_species_391287; generate_input_species_391287 is "Create input species of the pathway: species_391287";
  generate_input_species_391267: => SPHK1_cytosol; scale_parameter*k_input_species_391267; generate_input_species_391267 is "Create input species of the pathway: species_391267";
  generate_input_species_390455: => CCT_TRiC_ADP_cytosol; scale_parameter*k_input_species_390455; generate_input_species_390455 is "Create input species of the pathway: species_390455";
end
