// SBML level 3 version 1
// SBML generated from Reactome version 93 on 6/23/25, 11:03 PM using JSBML version 1.5.

model pathway_169911()
  // Regulation of Apoptosis
  // A regulated balance between cell survival and apoptosis is essential for normal development and homeostasis of multicellular organisms (see Matsuzawa, 2001). Defects in control of this balance may contribute to autoimmune disease, neurodegeneration and cancer. Protein ubiquitination and degradation is one of the major mechanisms that regulate apoptotic cell death (reviewed in Yang and Yu 2003).
  // reactome:R-HSA-169911 GO:0042981
  // isDescribedBy pubmed:11432772 pubmed:12724336

  // Compartments:
  compartment cytosol = 1.408e-12;  // GO:0005829
  compartment mitochondrial_inner_membrane;  // GO:0005743
  compartment mitochondrial_matrix;  // GO:0005759

  // Species:
  // Derived from a Reactome EntityWithAccessionedSequence. This is a protein
  species ARHGAP10_cytosol in cytosol; ARHGAP10_cytosol is "ARHGAP10 [cytosol]";  // uniprot:A1A4S6 reactome:R-HSA-195125; isHomologTo reactome:R-MMU-195125 reactome:R-RNO-195125 reactome:R-CFA-195125 reactome:R-BTA-195125
  // Derived from a Reactome EntityWithAccessionedSequence. This is a protein
  species p_T402_PAK2_213_524_cytosol in cytosol; p_T402_PAK2_213_524_cytosol is "p-T402-PAK2(213-524) [cytosol]";  // uniprot:Q13177 reactome:R-HSA-211654
  // Derived from a Reactome Complex. Here is Reactomes nested structure for this complex: (A1A4S6, Q13177). Reactome uses a nested structure for complexes, which cannot be fully represented in SBML Level 3 Version 1 core
  species species_211729 in cytosol = 0; species_211729 is "perinuclear PAK-2p34:RHG10 complex [cytosol]";  // reactome:R-HSA-211729; hasPart uniprot:A1A4S6 uniprot:Q13177; isHomologTo reactome:R-NUL-211727
  // Derived from a Reactome GenomeEncodedEntity. A peptide or polynucleotide whose sequence is unknown and thus cannot be linked to external sequence databases or used for orthology inference
  species Ubiquitin_ligase_cytosol in cytosol = 0; Ubiquitin_ligase_cytosol is "Ubiquitin ligase [cytosol]";  // reactome:R-HSA-69593
  // Derived from a Reactome EntityWithAccessionedSequence. This is a protein
  species species_8867509 in mitochondrial_inner_membrane = 0; species_8867509 is "OPA1(88-194) [mitochondrial inner membrane]";  // uniprot:O60313 reactome:R-HSA-8867509; isHomologTo reactome:R-MMU-8867509 reactome:R-RNO-8867509 reactome:R-CFA-8867509 reactome:R-BTA-8867509
  // Derived from a Reactome Complex. Here is Reactomes nested structure for this complex: (A1A4S6, Q13177). Reactome uses a nested structure for complexes, which cannot be fully represented in SBML Level 3 Version 1 core
  species PAK_2p34_RHG10_complex_cytosol in cytosol; PAK_2p34_RHG10_complex_cytosol is "PAK-2p34:RHG10 complex [cytosol]";  // reactome:R-HSA-211701; hasPart uniprot:A1A4S6 uniprot:Q13177; isHomologTo reactome:R-NUL-211695
  // Derived from a Reactome Complex. Here is Reactomes nested structure for this complex: (2xP25788, Q99460, O00232, 2xP49720, 2xQ99436, 2xP20618, 2xP28072, P43686, P62195, 2xP25786, 2xP28070, P51665, O00487, Q13200, O00231, Q15008, Q9UNM6, P60896, Q16186, 2xP25789, P48556, 2xP28066, P62333, P35998, P17980, 2xP25787, 2xO14818, 2xP49721, O43242, 2xP28074, P62191, 2xP60900). Reactome uses a nested structure for complexes, which cannot be fully represented in SBML Level 3 Version 1 core
  species _26S_proteasome_cytosol in cytosol = 0; _26S_proteasome_cytosol is "26S proteasome [cytosol]";  // isDescribedBy pubmed:10872471 pubmed:18775730; reactome:R-HSA-68819; hasPart uniprot:P25788 uniprot:Q99460 uniprot:O00232 uniprot:P49720; isHomologTo reactome:R-MMU-68819 reactome:R-RNO-68819 reactome:R-CFA-68819 reactome:R-BTA-68819
  // Derived from a Reactome SimpleEntity. This is a small compound
  species H2O_mitochondrial_matrix in mitochondrial_matrix; H2O_mitochondrial_matrix is "H2O [mitochondrial matrix]";  // CHEBI:15377 reactome:R-ALL-113521
  // Derived from a Reactome EntityWithAccessionedSequence. This is a protein
  species species_8867513 in mitochondrial_inner_membrane = 0; species_8867513 is "OPA1(195-960) [mitochondrial inner membrane]";  // uniprot:O60313 reactome:R-HSA-8867513; isHomologTo reactome:R-MMU-8867513 reactome:R-RNO-8867513 reactome:R-CFA-8867513 reactome:R-BTA-8867513
  // Derived from a Reactome DefinedSet. This is a list of alternative entities, any of which can perform the given function
  species Ub_cytosol in cytosol; Ub_cytosol is "Ub [cytosol]";  // reactome:R-HSA-113595; hasPart uniprot:P0CG47 uniprot:P62987 uniprot:P0CG48 uniprot:P62979; isHomologTo reactome:R-MMU-113595 reactome:R-RNO-113595 reactome:R-CFA-113595 reactome:R-BTA-113595
  // Derived from a Reactome EntityWithAccessionedSequence. This is a protein
  species species_3095873 in cytosol; species_3095873 is "K48polyUb-p-T402-PAK-2p43 [cytosol]";  // uniprot:Q13177 reactome:R-HSA-3095873
  // Derived from a Reactome EntityWithAccessionedSequence. This is a protein
  species species_8867508 in mitochondrial_inner_membrane; species_8867508 is "OPA1 [mitochondrial inner membrane]";  // uniprot:O60313 reactome:R-HSA-8867508; isHomologTo reactome:R-MMU-8867508 reactome:R-RNO-8867508 reactome:R-CFA-8867508 reactome:R-BTA-8867508
  // Derived from a Reactome Complex. Here is Reactomes nested structure for this complex: (Q96E52, 29105). Reactome uses a nested structure for complexes, which cannot be fully represented in SBML Level 3 Version 1 core
  species species_9840234 in mitochondrial_inner_membrane = 0; species_9840234 is "OMA1:Zn2+ [mitochondrial inner membrane]";  // reactome:R-HSA-9840234; hasPart uniprot:Q96E52 CHEBI:29105; isHomologTo reactome:R-MMU-9840234 reactome:R-RNO-9840234 reactome:R-CFA-9840234 reactome:R-BTA-9840234
  species avg_species_195125 in cytosol = 0; avg_species_195125 is "Average of species_195125";
  species avg_species_211654 in cytosol = 0; avg_species_211654 is "Average of species_211654";
  species avg_species_211701 in cytosol = 0; avg_species_211701 is "Average of species_211701";
  species avg_species_113521 in mitochondrial_matrix = 0; avg_species_113521 is "Average of species_113521";
  species avg_species_113595 in cytosol = 0; avg_species_113595 is "Average of species_113595";
  species avg_species_3095873 in cytosol = 0; avg_species_3095873 is "Average of species_3095873";
  species avg_species_8867508 in mitochondrial_inner_membrane = 0; avg_species_8867508 is "Average of species_8867508";
  species avg_species_9840234 in mitochondrial_inner_membrane = 0; avg_species_9840234 is "Average of species_9840234";
  species avg_species_8867513 in mitochondrial_inner_membrane = 0; avg_species_8867513 is "Average of species_8867513";
  species avg_species_68819 in cytosol = 0; avg_species_68819 is "Average of species_68819";
  species avg_species_8867509 in mitochondrial_inner_membrane = 0; avg_species_8867509 is "Average of species_8867509";
  species avg_species_69593 in cytosol = 0; avg_species_69593 is "Average of species_69593";
  species avg_species_211729 in cytosol = 0; avg_species_211729 is "Average of species_211729";

  // Parameters:
  scale_parameter = 1;
  k_output_species_9840234 = 1;
  k_output_species_8867513 = 1;
  k_output_species_68819 = 1;
  k_output_species_8867509 = 1;
  k_output_species_69593 = 1;
  k_output_species_211729 = 1;
  k_input_species_9840234 = 1e-7;
  k_input_species_8867508 = 1e-7;
  k_input_species_113521 = 1e-7;
  k_input_species_69593 = 1e-7;
  k_input_species_68819 = 1e-7;
  k_input_species_211654 = 1e-7;
  k_input_species_195125 = 1e-7;
  k_forcat_reaction_211734 = 1;
  k_activator_modifierspeciesreference_211734_catalyst_69593 = 1;
  k_forcat_reaction_211716 = 1;
  k_forcat_reaction_211731 = 1;
  k_forcat_reaction_211715 = 1;
  k_activator_modifierspeciesreference_211715_catalyst_68819 = 1;
  k_forcat_reaction_8867344 = 1;
  k_activator_modifierspeciesreference_8867344_catalyst_9840234 = 1;
  get_time = 0; get_time is "Auxiliary variable used in place of time due to naming restrictions";

  // Rate rules:
  get_time' = 1;
  avg_species_195125' = (ARHGAP10_cytosol - avg_species_195125)/(get_time + 1e-6);
  avg_species_211654' = (p_T402_PAK2_213_524_cytosol - avg_species_211654)/(get_time + 1e-6);
  avg_species_211701' = (PAK_2p34_RHG10_complex_cytosol - avg_species_211701)/(get_time + 1e-6);
  avg_species_113521' = (H2O_mitochondrial_matrix - avg_species_113521)/(get_time + 1e-6);
  avg_species_113595' = (Ub_cytosol - avg_species_113595)/(get_time + 1e-6);
  avg_species_3095873' = (species_3095873 - avg_species_3095873)/(get_time + 1e-6);
  avg_species_8867508' = (species_8867508 - avg_species_8867508)/(get_time + 1e-6);
  avg_species_9840234' = (species_9840234 - avg_species_9840234)/(get_time + 1e-6);
  avg_species_8867513' = (species_8867513 - avg_species_8867513)/(get_time + 1e-6);
  avg_species_68819' = (_26S_proteasome_cytosol - avg_species_68819)/(get_time + 1e-6);
  avg_species_8867509' = (species_8867509 - avg_species_8867509)/(get_time + 1e-6);
  avg_species_69593' = (Ubiquitin_ligase_cytosol - avg_species_69593)/(get_time + 1e-6);
  avg_species_211729' = (species_211729 - avg_species_211729)/(get_time + 1e-6);

  // Reactions:
  // PAK-2p34 is ubiquitinated prior to degradation (Jakobi et al., 2003). Here, ubiquitination of PAK-2p34 is described as occurring in the cytosol. However, to date it is not known whether this occurs in the nucleus or in the cytoplasm. Evidence for this reaction comes from experiments using both human and rabbit proteins. The polyubiquitin synthesized in the reaction is inferred to contain lysine-48 (K48) linkages because the modified protein is targeted to the proteasome (Komander 2009).
  Ubiquitination_of_PAK_2p34: p_T402_PAK2_213_524_cytosol + Ub_cytosol => species_3095873; Ubiquitin_ligase_cytosol^10/(k_activator_modifierspeciesreference_211734_catalyst_69593^10 + Ubiquitin_ligase_cytosol^10)*k_forcat_reaction_211734*p_T402_PAK2_213_524_cytosol*Ub_cytosol; Ubiquitination_of_PAK_2p34 is "Ubiquitination of PAK-2p34";  // modifiers: Ubiquitin_ligase_cytosol; reactome:R-HSA-211734; reactome:R-HSA-211734; GO:0004842; ec-code:6.3.2.19
  // Murine PS-GAP interacts specifically with caspase-activated PAK-2p34, but not active or inactive full-length PAK-2, through a region between the GAP and SH3 domains (Koeppel et al.,2004). Evidence for this reaction comes from experiments using both mouse and rabbit proteins.
  reaction_211716: ARHGAP10_cytosol + p_T402_PAK2_213_524_cytosol => PAK_2p34_RHG10_complex_cytosol; k_forcat_reaction_211716*ARHGAP10_cytosol*p_T402_PAK2_213_524_cytosol; reaction_211716 is "Rho GTPase-activating protein 10 (RHG10) interacts with caspase-activated PAK-2p34";  // reactome:R-HSA-211716; isDescribedBy pubmed:15471851; reactome:R-HSA-211716
  // Following caspase mediated cleavage, PAK-2p34 translocates to the nucleus (Jakobi et al., 2003). The interaction with PS-GAP changes the localization of PAK-2p34 from the nucleus to the perinuclear region (Koeppel et al.,2004).
  reaction_211731: PAK_2p34_RHG10_complex_cytosol => species_211729; k_forcat_reaction_211731*PAK_2p34_RHG10_complex_cytosol; reaction_211731 is "Interaction of PAK-2p34 with RGH10/ PS-GAP results in accumulation of PAK-2p34 in the perinuclear region";  // reactome:R-HSA-211731; isDescribedBy pubmed:15471851; reactome:R-HSA-211731; isDescribedBy pubmed:12853446
  // Proteolytically activated PAK-2p34, but not full-length PAK-2, is degraded rapidly by the proteasome (Jakobi et al., 2003). Here, degradation of PAK-2p34 is described as occurring in the cytosol. However, to date it is not known whether this occurs in the nucleus or in the cytoplasm.
  reaction_211715: species_3095873 => Ub_cytosol; _26S_proteasome_cytosol^10/(k_activator_modifierspeciesreference_211715_catalyst_68819^10 + _26S_proteasome_cytosol^10)*k_forcat_reaction_211715*species_3095873; reaction_211715 is "Proteasome mediated degradation of PAK-2p34";  // modifiers: _26S_proteasome_cytosol; reactome:R-HSA-211715; isDescribedBy pubmed:12853446; reactome:R-HSA-211715; GO:0004175
  // Mitochondrial metalloendopeptidase OMA1 (OMA1) is part of the quality control system in the inner membrane of mitochondria. OMA1 controls the cleavage and function of mitochondrial dynamin-like 120 kDa protein (OPA1), a GTPase required for mitochondrial fusion and regulation of apoptosis (Head et al. 2009). OPA1 is suggested to be antiapoptotic and mutations in OPA1 are the most prevalent cause of dominant optic atrophy (DOA), a progressive eye disease which affects retinal ganglion cells in the optic nerve (Yu-Wai-Man et al. 2009).
  OMA1_hydrolyses_OPA1: H2O_mitochondrial_matrix + species_8867508 => species_8867509 + species_8867513; species_9840234^10/(k_activator_modifierspeciesreference_8867344_catalyst_9840234^10 + species_9840234^10)*k_forcat_reaction_8867344*H2O_mitochondrial_matrix*species_8867508;  // modifiers: species_9840234; reactome:R-HSA-8867344; isDescribedBy pubmed:20038677 pubmed:19001017; reactome:R-HSA-8867344; GO:0004222
  degredete_output_species_9840234: species_9840234 => ; scale_parameter*k_output_species_9840234*species_9840234; degredete_output_species_9840234 is "Degredate the output species of the pathway: species_9840234";
  degredete_output_species_8867513: species_8867513 => ; scale_parameter*k_output_species_8867513*species_8867513; degredete_output_species_8867513 is "Degredate the output species of the pathway: species_8867513";
  degredete_output_species_68819: _26S_proteasome_cytosol => ; scale_parameter*k_output_species_68819*_26S_proteasome_cytosol; degredete_output_species_68819 is "Degredate the output species of the pathway: species_68819";
  degredete_output_species_8867509: species_8867509 => ; scale_parameter*k_output_species_8867509*species_8867509; degredete_output_species_8867509 is "Degredate the output species of the pathway: species_8867509";
  degredete_output_species_69593: Ubiquitin_ligase_cytosol => ; scale_parameter*k_output_species_69593*Ubiquitin_ligase_cytosol; degredete_output_species_69593 is "Degredate the output species of the pathway: species_69593";
  degredete_output_species_211729: species_211729 => ; scale_parameter*k_output_species_211729*species_211729; degredete_output_species_211729 is "Degredate the output species of the pathway: species_211729";
  generate_input_species_9840234: => species_9840234; scale_parameter*k_input_species_9840234; generate_input_species_9840234 is "Create input species of the pathway: species_9840234";
  generate_input_species_8867508: => species_8867508; scale_parameter*k_input_species_8867508; generate_input_species_8867508 is "Create input species of the pathway: species_8867508";
  generate_input_species_113521: => H2O_mitochondrial_matrix; scale_parameter*k_input_species_113521; generate_input_species_113521 is "Create input species of the pathway: species_113521";
  generate_input_species_69593: => Ubiquitin_ligase_cytosol; scale_parameter*k_input_species_69593; generate_input_species_69593 is "Create input species of the pathway: species_69593";
  generate_input_species_68819: => _26S_proteasome_cytosol; scale_parameter*k_input_species_68819; generate_input_species_68819 is "Create input species of the pathway: species_68819";
  generate_input_species_211654: => p_T402_PAK2_213_524_cytosol; scale_parameter*k_input_species_211654; generate_input_species_211654 is "Create input species of the pathway: species_211654";
  generate_input_species_195125: => ARHGAP10_cytosol; scale_parameter*k_input_species_195125; generate_input_species_195125 is "Create input species of the pathway: species_195125";
end
